<neuroml:neuroml lengthUnits="micrometer" xsi:schemaLocation="http://morphml.org/neuroml/schema" xmlns:neuroml="http://morphml.org/neuroml/schema" xmlns:xsi="http://www.w3.org/2001/XMLSchema-instance">
  <neuroml:cells>
    <neuroml:cell name="mitral">
      <meta:notes xmlns:meta="http://morphml.org/metadata/schema">Cell: soma exported from NEURON ModelView</meta:notes>
      <mml:segments xmlns:mml="http://morphml.org/morphml/schema">
        <mml:segment cable="0" id="0" name="Seg0_soma">
          <mml:proximal diameter="32" x="0" y="0" z="0" />
          <mml:distal diameter="32" x="32" y="0" z="0" />
        </mml:segment>
        <mml:segment cable="253" id="254" name="Seg0_sec_dendp4_0" parent="0">
          <mml:proximal diameter="5.8" x="0" y="0" z="0" />
          <mml:distal diameter="5.8" x="0" y="-25.9808" z="15" />
        </mml:segment>
        <mml:segment cable="200" id="201" name="Seg0_sec_dendp3_0" parent="0">
          <mml:proximal diameter="5.8" x="0" y="0" z="0" />
          <mml:distal diameter="5.8" x="-25.9808" y="3.18173e-15" z="15" />
        </mml:segment>
        <mml:segment cable="157" id="158" name="Seg0_sec_dendp2_0" parent="0">
          <mml:proximal diameter="5.8" x="0" y="0" z="0" />
          <mml:distal diameter="5.8" x="0" y="25.9808" z="15" />
        </mml:segment>
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      </mml:segments>
      <mml:cables xmlns:mml="http://morphml.org/morphml/schema">
        <mml:cable fract_along_parent="0" id="0" name="soma" />
        <mml:cable fract_along_parent="0" id="253" name="sec_dendp4_0" />
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        <mml:cablegroup name="ModelViewParmSubset_0">
          <mml:cable id="0" />
          <mml:cable id="253" />
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        </mml:cablegroup>
        <mml:cablegroup name="ModelViewParmSubset_1">
          <mml:cable id="0" />
          <mml:cable id="253" />
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        </mml:cablegroup>
        <mml:cablegroup name="ModelViewParmSubset_2">
          <mml:cable id="0" />
          <mml:cable id="253" />
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        </mml:cablegroup>
        <mml:cablegroup name="ModelViewParmSubset_3">
          <mml:cable id="0" />
          <mml:cable id="1" />
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        </mml:cablegroup>
        <mml:cablegroup name="ModelViewParmSubset_4">
          <mml:cable id="253" />
          <mml:cable id="200" />
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        </mml:cablegroup>
        <mml:cablegroup name="ModelViewParmSubset_5">
          <mml:cable id="110" />
          <mml:cable id="109" />
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        </mml:cablegroup>
        <mml:cablegroup name="ModelViewParmSubset_6">
          <mml:cable id="113" />
          <mml:cable id="100" />
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        </mml:cablegroup>
        <mml:cablegroup name="ModelViewParmSubset_7">
          <mml:cable id="111" />
          <mml:cable id="106" />
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        </mml:cablegroup>
        <mml:cablegroup name="ModelViewParmSubset_8">
          <mml:cable id="105" />
          <mml:cable id="104" />
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        </mml:cablegroup>
        <mml:cablegroup name="ModelViewParmSubset_9">
          <mml:cable id="103" />
          <mml:cable id="94" />
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        </mml:cablegroup>
        <mml:cablegroup name="ModelViewParmSubset_10">
          <mml:cable id="285" />
          <mml:cable id="252" />
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        </mml:cablegroup>
        <mml:cablegroup name="ModelViewParmSubset_11">
          <mml:cable id="284" />
          <mml:cable id="251" />
          <mml:cable id="198" />
          <mml:cable id="155" />
        </mml:cablegroup>
        <mml:cablegroup name="ModelViewParmSubset_12">
          <mml:cable id="283" />
          <mml:cable id="250" />
          <mml:cable id="197" />
          <mml:cable id="154" />
        </mml:cablegroup>
        <mml:cablegroup name="ModelViewParmSubset_13">
          <mml:cable id="5" />
          <mml:cable id="101" />
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        </mml:cablegroup>
        <mml:cablegroup name="ModelViewParmSubset_14">
          <mml:cable id="282" />
          <mml:cable id="249" />
          <mml:cable id="196" />
          <mml:cable id="153" />
        </mml:cablegroup>
        <mml:cablegroup name="ModelViewParmSubset_15">
          <mml:cable id="281" />
          <mml:cable id="248" />
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        </mml:cablegroup>
        <mml:cablegroup name="ModelViewParmSubset_16">
          <mml:cable id="91" />
          <mml:cable id="68" />
          <mml:cable id="44" />
          <mml:cable id="21" />
        </mml:cablegroup>
        <mml:cablegroup name="ModelViewParmSubset_17">
          <mml:cable id="257" />
          <mml:cable id="204" />
          <mml:cable id="161" />
          <mml:cable id="118" />
        </mml:cablegroup>
        <mml:cablegroup name="ModelViewParmSubset_18">
          <mml:cable id="256" />
          <mml:cable id="203" />
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        </mml:cablegroup>
        <mml:cablegroup name="ModelViewParmSubset_19">
          <mml:cable id="117" />
          <mml:cable id="121" />
        </mml:cablegroup>
        <mml:cablegroup name="ModelViewParmSubset_20">
          <mml:cable id="67" />
          <mml:cable id="20" />
        </mml:cablegroup>
        <mml:cablegroup name="ModelViewParmSubset_21">
          <mml:cable id="254" />
          <mml:cable id="201" />
          <mml:cable id="158" />
          <mml:cable id="115" />
        </mml:cablegroup>
        <mml:cablegroup name="ModelViewParmSubset_22">
          <mml:cable id="253" />
          <mml:cable id="200" />
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        </mml:cablegroup>
        <mml:cablegroup name="ModelViewParmSubset_23">
          <mml:cable id="1" />
          <mml:cable id="2" />
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        </mml:cablegroup>
        <mml:cablegroup name="ModelViewParmSubset_24">
          <mml:cable id="14" />
          <mml:cable id="15" />
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        </mml:cablegroup>
        <mml:cablegroup name="ModelViewParmSubset_25">
          <mml:cable id="11" />
          <mml:cable id="12" />
          <mml:cable id="13" />
        </mml:cablegroup>
        <mml:cablegroup name="ModelViewParmSubset_26">
          <mml:cable id="276" />
          <mml:cable id="261" />
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        </mml:cablegroup>
        <mml:cablegroup name="ModelViewParmSubset_27">
          <mml:cable id="253" />
          <mml:cable id="200" />
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        </mml:cablegroup>
        <mml:cablegroup name="ModelViewParmSubset_28">
          <mml:cable id="6" />
          <mml:cable id="7" />
          <mml:cable id="8" />
          <mml:cable id="9" />
        </mml:cablegroup>
        <mml:cablegroup name="ModelViewParmSubset_29">
          <mml:cable id="3" />
          <mml:cable id="4" />
          <mml:cable id="5" />
        </mml:cablegroup>
        <mml:cablegroup name="ModelViewParmSubset_30">
          <mml:cable id="1" />
          <mml:cable id="2" />
        </mml:cablegroup>
        <mml:cablegroup name="ModelViewParmSubset_31">
          <mml:cable id="0" />
          <mml:cable id="67" />
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        </mml:cablegroup>
        <mml:cablegroup name="ModelViewParmSubset_32">
          <mml:cable id="67" />
          <mml:cable id="20" />
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        </mml:cablegroup>
        <mml:cablegroup name="ModelViewParmSubset_33">
          <mml:cable id="12" />
          <mml:cable id="13" />
        </mml:cablegroup>
        <mml:cablegroup name="ModelViewParmSubset_34">
          <mml:cable id="6" />
          <mml:cable id="7" />
        </mml:cablegroup>
        <mml:cablegroup name="OneSecGrp_SectionRef_1">
          <mml:cable id="0" />
        </mml:cablegroup>
        <mml:cablegroup name="OneSecGrp_SectionRef_29">
          <mml:cable id="4" />
        </mml:cablegroup>
        <mml:cablegroup name="OneSecGrp_SectionRef_48">
          <mml:cable id="19" />
        </mml:cablegroup>
        <mml:cablegroup name="OneSecGrp_SectionRef_19">
          <mml:cable id="3" />
        </mml:cablegroup>
        <mml:cablegroup name="OneSecGrp_SectionRef_38">
          <mml:cable id="18" />
        </mml:cablegroup>
        <mml:cablegroup name="OneSecGrp_SectionRef_28">
          <mml:cable id="17" />
        </mml:cablegroup>
        <mml:cablegroup name="OneSecGrp_SectionRef_18">
          <mml:cable id="16" />
        </mml:cablegroup>
        <mml:cablegroup name="OneSecGrp_SectionRef_13">
          <mml:cable id="2" />
        </mml:cablegroup>
        <mml:cablegroup name="OneSecGrp_SectionRef_12">
          <mml:cable id="15" />
        </mml:cablegroup>
        <mml:cablegroup name="OneSecGrp_SectionRef_6">
          <mml:cable id="14" />
        </mml:cablegroup>
        <mml:cablegroup name="OneSecGrp_SectionRef_7">
          <mml:cable id="1" />
        </mml:cablegroup>
        <mml:cablegroup name="OneSecGrp_SectionRef_115">
          <mml:cable id="10" />
        </mml:cablegroup>
        <mml:cablegroup name="OneSecGrp_SectionRef_140">
          <mml:cable id="11" />
        </mml:cablegroup>
        <mml:cablegroup name="OneSecGrp_SectionRef_90">
          <mml:cable id="9" />
        </mml:cablegroup>
        <mml:cablegroup name="OneSecGrp_SectionRef_73">
          <mml:cable id="8" />
        </mml:cablegroup>
      </mml:cables>
      <neuroml:biophysics units="Physiological Units">
        <bio:mechanism name="pas" passive_conductance="true" type="Channel Mechanism" xmlns:bio="http://morphml.org/biophysics/schema">
          <bio:parameter name="gmax" value="0.05">
            <bio:group>ModelViewParmSubset_4</bio:group>
          </bio:parameter>
          <bio:parameter name="gmax" value="0.05">
            <bio:group>OneSecGrp_SectionRef_1</bio:group>
          </bio:parameter>
          <bio:parameter name="e" value="-58">
            <bio:group>all</bio:group>
          </bio:parameter>
        </bio:mechanism>
        <bio:mechanism name="Ca_mit_conc" type="Ion Concentration" xmlns:bio="http://morphml.org/biophysics/schema">
          <bio:parameter name="depth" value="0.125">
            <bio:group>ModelViewParmSubset_5</bio:group>
          </bio:parameter>
          <bio:parameter name="depth" value="0.175">
            <bio:group>ModelViewParmSubset_6</bio:group>
          </bio:parameter>
          <bio:parameter name="depth" value="0.2">
            <bio:group>ModelViewParmSubset_7</bio:group>
          </bio:parameter>
          <bio:parameter name="depth" value="0.225">
            <bio:group>ModelViewParmSubset_8</bio:group>
          </bio:parameter>
          <bio:parameter name="depth" value="0.25">
            <bio:group>ModelViewParmSubset_9</bio:group>
          </bio:parameter>
          <bio:parameter name="depth" value="0.375">
            <bio:group>ModelViewParmSubset_10</bio:group>
          </bio:parameter>
          <bio:parameter name="depth" value="0.4">
            <bio:group>ModelViewParmSubset_11</bio:group>
          </bio:parameter>
          <bio:parameter name="depth" value="0.45">
            <bio:group>ModelViewParmSubset_12</bio:group>
          </bio:parameter>
          <bio:parameter name="depth" value="0.5">
            <bio:group>ModelViewParmSubset_13</bio:group>
          </bio:parameter>
          <bio:parameter name="depth" value="0.55">
            <bio:group>ModelViewParmSubset_14</bio:group>
          </bio:parameter>
          <bio:parameter name="depth" value="0.675">
            <bio:group>ModelViewParmSubset_15</bio:group>
          </bio:parameter>
          <bio:parameter name="depth" value="0.7">
            <bio:group>ModelViewParmSubset_16</bio:group>
          </bio:parameter>
          <bio:parameter name="depth" value="0.725">
            <bio:group>ModelViewParmSubset_17</bio:group>
          </bio:parameter>
          <bio:parameter name="depth" value="0.75">
            <bio:group>OneSecGrp_SectionRef_29</bio:group>
          </bio:parameter>
          <bio:parameter name="depth" value="0.775">
            <bio:group>ModelViewParmSubset_18</bio:group>
          </bio:parameter>
          <bio:parameter name="depth" value="0.8">
            <bio:group>ModelViewParmSubset_19</bio:group>
          </bio:parameter>
          <bio:parameter name="depth" value="0.875">
            <bio:group>ModelViewParmSubset_20</bio:group>
          </bio:parameter>
          <bio:parameter name="depth" value="1.175">
            <bio:group>OneSecGrp_SectionRef_48</bio:group>
          </bio:parameter>
          <bio:parameter name="depth" value="1.25">
            <bio:group>OneSecGrp_SectionRef_19</bio:group>
          </bio:parameter>
          <bio:parameter name="depth" value="1.325">
            <bio:group>OneSecGrp_SectionRef_38</bio:group>
          </bio:parameter>
          <bio:parameter name="depth" value="1.4">
            <bio:group>ModelViewParmSubset_21</bio:group>
          </bio:parameter>
          <bio:parameter name="depth" value="1.45">
            <bio:group>ModelViewParmSubset_22</bio:group>
          </bio:parameter>
          <bio:parameter name="depth" value="1.5">
            <bio:group>OneSecGrp_SectionRef_28</bio:group>
          </bio:parameter>
          <bio:parameter name="depth" value="1.65">
            <bio:group>OneSecGrp_SectionRef_18</bio:group>
          </bio:parameter>
          <bio:parameter name="depth" value="1.75">
            <bio:group>OneSecGrp_SectionRef_13</bio:group>
          </bio:parameter>
          <bio:parameter name="depth" value="1.825">
            <bio:group>OneSecGrp_SectionRef_12</bio:group>
          </bio:parameter>
          <bio:parameter name="depth" value="1.975">
            <bio:group>OneSecGrp_SectionRef_6</bio:group>
          </bio:parameter>
          <bio:parameter name="depth" value="2.5">
            <bio:group>OneSecGrp_SectionRef_7</bio:group>
          </bio:parameter>
          <bio:parameter name="depth" value="8">
            <bio:group>OneSecGrp_SectionRef_1</bio:group>
          </bio:parameter>
          <bio:parameter name="ica" value="0">
            <bio:group>ModelViewParmSubset_2</bio:group>
          </bio:parameter>
        </bio:mechanism>
        <bio:mechanism name="KA_bsg_yka" type="Channel Mechanism" xmlns:bio="http://morphml.org/biophysics/schema">
          <bio:parameter name="gmax" value="5.15">
            <bio:group>ModelViewParmSubset_23</bio:group>
          </bio:parameter>
          <bio:parameter name="gmax" value="5.87">
            <bio:group>OneSecGrp_SectionRef_1</bio:group>
          </bio:parameter>
        </bio:mechanism>
        <bio:mechanism name="Kca_mit_usb" type="Channel Mechanism" xmlns:bio="http://morphml.org/biophysics/schema">
          <bio:parameter name="gmax" value="8.87">
            <bio:group>ModelViewParmSubset_23</bio:group>
          </bio:parameter>
          <bio:parameter name="gmax" value="14.2">
            <bio:group>OneSecGrp_SectionRef_1</bio:group>
          </bio:parameter>
        </bio:mechanism>
        <bio:mechanism name="K2_mit_usb" type="Channel Mechanism" xmlns:bio="http://morphml.org/biophysics/schema">
          <bio:parameter name="gmax" value="50.0">
            <bio:group>ModelViewParmSubset_24</bio:group>
          </bio:parameter>
          <bio:parameter name="gmax" value="10.0">
            <bio:group>ModelViewParmSubset_32</bio:group>
          </bio:parameter>
          <bio:parameter name="gmax" value="7.7">
            <bio:group>ModelViewParmSubset_25</bio:group>
          </bio:parameter>
          <bio:parameter name="gmax" value="12.8">
            <bio:group>ModelViewParmSubset_26</bio:group>
          </bio:parameter>
          <bio:parameter name="gmax" value="22.6">
            <bio:group>ModelViewParmSubset_27</bio:group>
          </bio:parameter>
          <bio:parameter name="gmax" value="38.5">
            <bio:group>OneSecGrp_SectionRef_115</bio:group>
          </bio:parameter>
          <bio:parameter name="gmax" value="77.1">
            <bio:group>ModelViewParmSubset_28</bio:group>
          </bio:parameter>
          <bio:parameter name="gmax" value="115.6">
            <bio:group>ModelViewParmSubset_29</bio:group>
          </bio:parameter>
          <bio:parameter name="gmax" value="154.1">
            <bio:group>ModelViewParmSubset_30</bio:group>
          </bio:parameter>
          <bio:parameter name="gmax" value="195.6">
            <bio:group>OneSecGrp_SectionRef_1</bio:group>
          </bio:parameter>
          <bio:parameter name="gmax" value="200.0">
            <bio:group>OneSecGrp_SectionRef_13</bio:group>
          </bio:parameter>
        </bio:mechanism>
        <bio:mechanism name="K_mit_usb" type="Channel Mechanism" xmlns:bio="http://morphml.org/biophysics/schema">
          <bio:parameter name="gmax" value="0.85">
            <bio:group>ModelViewParmSubset_27</bio:group>
          </bio:parameter>
          <bio:parameter name="gmax" value="1.55">
            <bio:group>ModelViewParmSubset_23</bio:group>
          </bio:parameter>
          <bio:parameter name="gmax" value="1.74">
            <bio:group>ModelViewParmSubset_24</bio:group>
          </bio:parameter>
          <bio:parameter name="gmax" value="2.8">
            <bio:group>ModelViewParmSubset_31</bio:group>
          </bio:parameter>
        </bio:mechanism>
        <bio:mechanism name="LCa3_mit_usb" type="Channel Mechanism" xmlns:bio="http://morphml.org/biophysics/schema">
          <bio:parameter name="gmax" value="0.4">
            <bio:group>ModelViewParmSubset_27</bio:group>
          </bio:parameter>
          <bio:parameter name="gmax" value="2">
            <bio:group>ModelViewParmSubset_23</bio:group>
          </bio:parameter>
          <bio:parameter name="gmax" value="2.2">
            <bio:group>ModelViewParmSubset_24</bio:group>
          </bio:parameter>
          <bio:parameter name="gmax" value="4">
            <bio:group>OneSecGrp_SectionRef_1</bio:group>
          </bio:parameter>
          <bio:parameter name="gmax" value="9.5">
            <bio:group>ModelViewParmSubset_32</bio:group>
          </bio:parameter>
        </bio:mechanism>
        <bio:mechanism name="Na_mit_ms" type="Channel Mechanism" xmlns:bio="http://morphml.org/biophysics/schema">
          <bio:parameter name="gmax" value="50.0">
            <bio:group>ModelViewParmSubset_24</bio:group>
          </bio:parameter>
          <bio:parameter name="gmax" value="10.0">
            <bio:group>ModelViewParmSubset_32</bio:group>
          </bio:parameter>
          <bio:parameter name="gmax" value="11.7">
            <bio:group>ModelViewParmSubset_33</bio:group>
          </bio:parameter>
          <bio:parameter name="gmax" value="12.2">
            <bio:group>ModelViewParmSubset_26</bio:group>
          </bio:parameter>
          <bio:parameter name="gmax" value="153.2">
            <bio:group>OneSecGrp_SectionRef_1</bio:group>
          </bio:parameter>
          <bio:parameter name="gmax" value="23.4">
            <bio:group>OneSecGrp_SectionRef_140</bio:group>
          </bio:parameter>
          <bio:parameter name="gmax" value="33">
            <bio:group>ModelViewParmSubset_27</bio:group>
          </bio:parameter>
          <bio:parameter name="gmax" value="58.6">
            <bio:group>OneSecGrp_SectionRef_115</bio:group>
          </bio:parameter>
          <bio:parameter name="gmax" value="117">
            <bio:group>OneSecGrp_SectionRef_90</bio:group>
          </bio:parameter>
          <bio:parameter name="gmax" value="234">
            <bio:group>OneSecGrp_SectionRef_73</bio:group>
          </bio:parameter>
          <bio:parameter name="gmax" value="351.1">
            <bio:group>ModelViewParmSubset_34</bio:group>
          </bio:parameter>
          <bio:parameter name="gmax" value="468.1">
            <bio:group>ModelViewParmSubset_23</bio:group>
          </bio:parameter>
        </bio:mechanism>
        <bio:mechanism name="Na_mit_initialsegment_ms" type="Channel Mechanism" xmlns:bio="http://morphml.org/biophysics/schema">
          <bio:parameter name="gmax" value="500.0">
            <bio:group>OneSecGrp_SectionRef_13</bio:group>
          </bio:parameter>
        </bio:mechanism>
        <bio:spec_capacitance xmlns:bio="http://morphml.org/biophysics/schema">
          <bio:parameter value="1">
            <bio:group>all</bio:group>
          </bio:parameter>
        </bio:spec_capacitance>
        <bio:spec_axial_resistance xmlns:bio="http://morphml.org/biophysics/schema">
          <bio:parameter value="0.2">
            <bio:group>all</bio:group>
          </bio:parameter>
        </bio:spec_axial_resistance>
        <bio:init_memb_potential xmlns:bio="http://morphml.org/biophysics/schema">
          <bio:parameter value="-58">
            <bio:group>all</bio:group>
          </bio:parameter>
        </bio:init_memb_potential>
      </neuroml:biophysics>
      <neuroml:connectivity>
        <nml:potential_syn_loc synapse_direction="post" synapse_type="ORN_mitral" xmlns:nml="http://morphml.org/networkml/schema">
          <nml:group>ModelViewParmSubset_32</nml:group>
        </nml:potential_syn_loc>
        <nml:potential_syn_loc synapse_direction="post" synapse_type="PG_mitral" xmlns:nml="http://morphml.org/networkml/schema">
          <nml:group>ModelViewParmSubset_32</nml:group>
        </nml:potential_syn_loc>
        <nml:potential_syn_loc synapse_direction="post" synapse_type="granule_mitral" xmlns:nml="http://morphml.org/networkml/schema">
          <nml:group>ModelViewParmSubset_26</nml:group>
          <nml:group>ModelViewParmSubset_27</nml:group>
          <nml:group>ModelViewParmSubset_24</nml:group>
          <nml:group>OneSecGrp_SectionRef_1</nml:group>
        </nml:potential_syn_loc>
      </neuroml:connectivity>
    </neuroml:cell>
    <neuroml:cell name="granule">
      <meta:notes xmlns:meta="http://morphml.org/metadata/schema">Cell: granule morphml written by hand by Aditya.</meta:notes>
      <mml:segments xmlns:mml="http://morphml.org/morphml/schema">
        <mml:segment cable="0" id="0" name="soma">
          <mml:proximal diameter="8" x="0" y="0" z="0" />
          <mml:distal diameter="8" x="0" y="0" z="8" />
        </mml:segment>
        <mml:segment cable="1" id="1" name="periphery" parent="0">
          <mml:proximal diameter="0.5" x="0" y="0" z="8" />
          <mml:distal diameter="0.5" x="0" y="0" z="258" />
        </mml:segment>
      </mml:segments>
      <mml:cables xmlns:mml="http://morphml.org/morphml/schema">
        <mml:cable fract_along_parent="0" id="0" name="soma" />
        <mml:cable fract_along_parent="1" id="1" name="periphery" />
        <mml:cablegroup name="all">
          <mml:cable id="0" />
          <mml:cable id="1" />
        </mml:cablegroup>
        <mml:cablegroup name="soma">
          <mml:cable id="0" />
        </mml:cablegroup>
        <mml:cablegroup name="periphery">
          <mml:cable id="1" />
        </mml:cablegroup>
      </mml:cables>
      <neuroml:biophysics units="Physiological Units">
        <bio:mechanism name="pas" passive_conductance="true" type="Channel Mechanism" xmlns:bio="http://morphml.org/biophysics/schema">
          <bio:parameter name="gmax" value="0.13333">
            <bio:group>all</bio:group>
          </bio:parameter>
          <bio:parameter name="e" value="-65">
            <bio:group>all</bio:group>
          </bio:parameter>
        </bio:mechanism>
        <bio:mechanism name="Na_rat_ms" type="Channel Mechanism" xmlns:bio="http://morphml.org/biophysics/schema">
          <bio:parameter name="gmax" value="25">
            <bio:group>soma</bio:group>
          </bio:parameter>
          <bio:parameter name="gmax" value="10">
            <bio:group>periphery</bio:group>
          </bio:parameter>
        </bio:mechanism>
        <bio:mechanism name="K2_mit_usb" type="Channel Mechanism" xmlns:bio="http://morphml.org/biophysics/schema">
          <bio:parameter name="gmax" value="10">
            <bio:group>soma</bio:group>
          </bio:parameter>
          <bio:parameter name="gmax" value="5">
            <bio:group>periphery</bio:group>
          </bio:parameter>
          <bio:parameter name="e" value="-80">
            <bio:group>all</bio:group>
          </bio:parameter>
        </bio:mechanism>
        <bio:mechanism name="KA_ms" type="Channel Mechanism" xmlns:bio="http://morphml.org/biophysics/schema">
          <bio:parameter name="gmax" value="15">
            <bio:group>soma</bio:group>
          </bio:parameter>
          <bio:parameter name="gmax" value="10.0">
            <bio:group>periphery</bio:group>
          </bio:parameter>
          <bio:parameter name="e" value="-80">
            <bio:group>all</bio:group>
          </bio:parameter>
        </bio:mechanism>
        <bio:spec_capacitance xmlns:bio="http://morphml.org/biophysics/schema">
          <bio:parameter value="4">
            <bio:group>all</bio:group>
          </bio:parameter>
        </bio:spec_capacitance>
        <bio:spec_axial_resistance xmlns:bio="http://morphml.org/biophysics/schema">
          <bio:parameter value="0.08">
            <bio:group>all</bio:group>
          </bio:parameter>
        </bio:spec_axial_resistance>
        <bio:init_memb_potential xmlns:bio="http://morphml.org/biophysics/schema">
          <bio:parameter value="-65">
            <bio:group>all</bio:group>
          </bio:parameter>
        </bio:init_memb_potential>
      </neuroml:biophysics>
      <neuroml:connectivity>
        <nml:potential_syn_loc synapse_direction="post" synapse_type="mitral_granule" xmlns:nml="http://morphml.org/networkml/schema">
          <nml:group>periphery</nml:group>
        </nml:potential_syn_loc>
        <nml:potential_syn_loc synapse_direction="pre" synapse_type="granule_mitral" xmlns:nml="http://morphml.org/networkml/schema">
          <nml:group>periphery</nml:group>
        </nml:potential_syn_loc>
      </neuroml:connectivity>
    </neuroml:cell>
    <neuroml:cell name="PG">
      <meta:notes xmlns:meta="http://morphml.org/metadata/schema">Cell: periglomerular morphml written by hand by Aditya Gilra, NCBS, Bangalore, India.</meta:notes>
      <mml:segments xmlns:mml="http://morphml.org/morphml/schema">
        <mml:segment cable="0" id="0" name="soma">
          <mml:proximal diameter="8" x="0" y="0" z="0" />
          <mml:distal diameter="8" x="8" y="0" z="0" />
        </mml:segment>
        <mml:segment cable="1" id="1" name="dend0" parent="0">
          <mml:proximal diameter="1" x="8" y="0" z="0" />
          <mml:distal diameter="1" x="28" y="0" z="0" />
        </mml:segment>
        <mml:segment cable="2" id="2" name="dend1" parent="0">
          <mml:proximal diameter="1" x="8" y="0" z="0" />
          <mml:distal diameter="1" x="8" y="20" z="0" />
        </mml:segment>
      </mml:segments>
      <mml:cables xmlns:mml="http://morphml.org/morphml/schema">
        <mml:cable id="0" name="soma" />
        <mml:cable id="1" name="dend0" />
        <mml:cable id="2" name="dend1" />
        <mml:cablegroup name="all">
          <mml:cable id="0" />
          <mml:cable id="1" />
          <mml:cable id="2" />
        </mml:cablegroup>
        <mml:cablegroup name="somagroup">
          <mml:cable id="0" />
        </mml:cablegroup>
        <mml:cablegroup name="dendrites">
          <mml:cable id="1" />
          <mml:cable id="2" />
        </mml:cablegroup>
        <mml:cablegroup name="ORNdendrite">
          <mml:cable id="1" />
        </mml:cablegroup>
        <mml:cablegroup name="periphery">
          <mml:cable id="1" />
          <mml:cable id="2" />
        </mml:cablegroup>
      </mml:cables>
      <neuroml:biophysics units="Physiological Units">
        <bio:mechanism name="pas" passive_conductance="true" type="Channel Mechanism" xmlns:bio="http://morphml.org/biophysics/schema">
          <bio:parameter name="gmax" value="0.5">
            <bio:group>all</bio:group>
          </bio:parameter>
          <bio:parameter name="e" value="-67">
            <bio:group>all</bio:group>
          </bio:parameter>
        </bio:mechanism>
        <bio:mechanism name="Na_rat_ms" type="Channel Mechanism" xmlns:bio="http://morphml.org/biophysics/schema">
          <bio:parameter name="gmax" value="20">
            <bio:group>somagroup</bio:group>
          </bio:parameter>
          <bio:parameter name="gmax" value="5">
            <bio:group>periphery</bio:group>
          </bio:parameter>
        </bio:mechanism>
        <bio:mechanism name="K2_mit_usb" type="Channel Mechanism" xmlns:bio="http://morphml.org/biophysics/schema">
          <bio:parameter name="gmax" value="40">
            <bio:group>somagroup</bio:group>
          </bio:parameter>
          <bio:parameter name="gmax" value="20">
            <bio:group>periphery</bio:group>
          </bio:parameter>
          <bio:parameter name="e" value="-80">
            <bio:group>all</bio:group>
          </bio:parameter>
        </bio:mechanism>
        <bio:mechanism name="Ih_cb" type="Channel Mechanism" xmlns:bio="http://morphml.org/biophysics/schema">
          <bio:parameter name="gmax" value="0.3">
            <bio:group>somagroup</bio:group>
          </bio:parameter>
          <bio:parameter name="gmax" value="0.1">
            <bio:group>periphery</bio:group>
          </bio:parameter>
        </bio:mechanism>
        <bio:mechanism name="TCa_d" type="Channel Mechanism" xmlns:bio="http://morphml.org/biophysics/schema">
          <bio:parameter name="gmax" value="3.0">
            <bio:group>somagroup</bio:group>
          </bio:parameter>
          <bio:parameter name="gmax" value="1.0">
            <bio:group>periphery</bio:group>
          </bio:parameter>
        </bio:mechanism>
        <bio:mechanism name="KA_bsg_yka" type="Channel Mechanism" xmlns:bio="http://morphml.org/biophysics/schema">
          <bio:parameter name="gmax" value="5.0">
            <bio:group>somagroup</bio:group>
          </bio:parameter>
          <bio:parameter name="gmax" value="5.0">
            <bio:group>periphery</bio:group>
          </bio:parameter>
          <bio:parameter name="e" value="-80">
            <bio:group>all</bio:group>
          </bio:parameter>
        </bio:mechanism>
        <bio:mechanism name="Ca_mit_conc" type="Ion Concentration" xmlns:bio="http://morphml.org/biophysics/schema">
          <bio:parameter name="depth" value="0.125">
            <bio:group>somagroup</bio:group>
          </bio:parameter>
          <bio:parameter name="depth" value="0.125">
            <bio:group>dendrites</bio:group>
          </bio:parameter>
        </bio:mechanism>
        <bio:spec_capacitance xmlns:bio="http://morphml.org/biophysics/schema">
          <bio:parameter value="1.0">
            <bio:group>all</bio:group>
          </bio:parameter>
        </bio:spec_capacitance>
        <bio:spec_axial_resistance xmlns:bio="http://morphml.org/biophysics/schema">
          <bio:parameter value="0.2">
            <bio:group>all</bio:group>
          </bio:parameter>
        </bio:spec_axial_resistance>
        <bio:init_memb_potential xmlns:bio="http://morphml.org/biophysics/schema">
          <bio:parameter value="-65">
            <bio:group>all</bio:group>
          </bio:parameter>
        </bio:init_memb_potential>
      </neuroml:biophysics>
      <neuroml:connectivity>
        <nml:potential_syn_loc synapse_direction="post" synapse_type="ORN_PG" xmlns:nml="http://morphml.org/networkml/schema">
          <nml:group>dendrites</nml:group>
        </nml:potential_syn_loc>
        <nml:potential_syn_loc synapse_direction="post" synapse_type="mitral_PG" xmlns:nml="http://morphml.org/networkml/schema">
          <nml:group>dendrites</nml:group>
        </nml:potential_syn_loc>
        <nml:potential_syn_loc synapse_direction="pre" synapse_type="PG_mitral" xmlns:nml="http://morphml.org/networkml/schema">
          <nml:group>dendrites</nml:group>
        </nml:potential_syn_loc>
        <nml:potential_syn_loc synapse_direction="post" synapse_type="SA_PG" xmlns:nml="http://morphml.org/networkml/schema">
          <nml:group>dendrites</nml:group>
        </nml:potential_syn_loc>
      </neuroml:connectivity>
    </neuroml:cell>
  </neuroml:cells>
  <meta:notes xmlns:meta="http://morphml.org/metadata/schema">
		Fully instantiated network model of Olfactory Bulb by Aditya Gilra, NCBS, Bangalore, India, 2010.
	</meta:notes>
  <nml:populations xmlns:nml="http://morphml.org/networkml/schema">
    <nml:population cell_type="mitral" name="mitrals">
      <nml:instances size="4">
        <nml:instance id="0">
          <nml:location x="0.0" y="0.0" z="300.0" />
          <meta:notes xmlns:meta="http://morphml.org/metadata/schema">
						zrotation=0.915266923378
					</meta:notes>
        </nml:instance>
        <nml:instance id="3">
          <nml:location x="404.393726247" y="-1.36000396892" z="300.0" />
          <meta:notes xmlns:meta="http://morphml.org/metadata/schema">
						zrotation=3.96100915286
					</meta:notes>
        </nml:instance>
      </nml:instances>
    </nml:population>
    <nml:population cell_type="granule" name="granules_singles">
      <nml:instances size="384">
        <nml:instance id="0">
          <nml:location x="-1092.0" y="800.0" z="0.0" />
        </nml:instance>
        <nml:instance id="1">
          <nml:location x="-1030.0" y="352.0" z="0.0" />
        </nml:instance>
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      </nml:instances>
    </nml:population>
    <nml:population cell_type="granule" name="granules_joints">
      <nml:instances size="748">
        <nml:instance id="0">
          <nml:location x="-914.0" y="552.0" z="0.0" />
        </nml:instance>
        <nml:instance id="1">
          <nml:location x="-908.0" y="520.0" z="0.0" />
        </nml:instance>
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      </nml:instances>
    </nml:population>
    <nml:population cell_type="granule" name="granules_multis">
      <nml:instances size="32">
        <nml:instance id="0">
          <nml:location x="-92.0" y="92.0" z="0.0" />
        </nml:instance>
        <nml:instance id="1">
          <nml:location x="-40.0" y="0.0" z="0.0" />
        </nml:instance>
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      </nml:instances>
    </nml:population>
    <nml:population cell_type="PG" name="PGs">
      <nml:instances size="368">
        <nml:instance id="2">
          <nml:location x="-100.0" y="45.4647723677" z="1050.0" />
        </nml:instance>
        <nml:instance id="3">
          <nml:location x="-93.6754446797" y="-100.0" z="1050.0" />
        </nml:instance>
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      </nml:instances>
    </nml:population>
  </nml:populations>
  <nml:projections units="SI Units" xmlns:nml="http://morphml.org/networkml/schema">
    <nml:projection name="mitral_granule_extra_exc_singles" source="mitrals" target="granules_singles">
      <nml:synapse_props prop_delay="0.0018" synapse_type="mitral_granule_AMPA" threshold="-0.015" weight="1.0" />
      <nml:synapse_props prop_delay="0.0018" synapse_type="mitral_granule_NMDA" threshold="-0.015" weight="1.0" />
      <nml:connections size="101">
        <nml:connection id="0" post_cell_id="126" post_segment_id="1" pre_cell_id="0" pre_segment_id="206">
          <nml:properties internal_delay="0.0018" synapse_type="mitral_granule_AMPA" weight="1.26535176165" />
          <nml:properties internal_delay="0.0018" synapse_type="mitral_granule_NMDA" weight="1.01288276435" />
        </nml:connection>
        <nml:connection id="2" post_cell_id="129" post_segment_id="1" pre_cell_id="0" pre_segment_id="211">
          <nml:properties internal_delay="0.0018" synapse_type="mitral_granule_AMPA" weight="0.731832172234" />
          <nml:properties internal_delay="0.0018" synapse_type="mitral_granule_NMDA" weight="0.84564799393" />
        </nml:connection>
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      </nml:connections>
    </nml:projection>
    <nml:projection name="mitral_granule_main_exc_singles" source="mitrals" target="granules_singles">
      <nml:synapse_props prop_delay="0.0018" synapse_type="mitral_granule_AMPA" threshold="-0.015" weight="1.0" />
      <nml:synapse_props prop_delay="0.0018" synapse_type="mitral_granule_NMDA" threshold="-0.015" weight="1.0" />
      <nml:connections size="384">
        <nml:connection id="0" post_cell_id="0" post_segment_id="1" pre_cell_id="0" pre_segment_id="189">
          <nml:properties internal_delay="0.0018" synapse_type="mitral_granule_AMPA" weight="0.899747362522" />
          <nml:properties internal_delay="0.0018" synapse_type="mitral_granule_NMDA" weight="0.868031337512" />
        </nml:connection>
        <nml:connection id="1" post_cell_id="1" post_segment_id="1" pre_cell_id="0" pre_segment_id="179">
          <nml:properties internal_delay="0.0018" synapse_type="mitral_granule_AMPA" weight="0.789229276973" />
          <nml:properties internal_delay="0.0018" synapse_type="mitral_granule_NMDA" weight="0.653957477296" />
        </nml:connection>
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      </nml:connections>
    </nml:projection>
    <nml:projection name="mitral_granule_extra_exc_joints" source="mitrals" target="granules_joints">
      <nml:synapse_props prop_delay="0.0018" synapse_type="mitral_granule_AMPA" threshold="-0.015" weight="1.0" />
      <nml:synapse_props prop_delay="0.0018" synapse_type="mitral_granule_NMDA" threshold="-0.015" weight="1.0" />
      <nml:connections size="1976">
        <nml:connection id="0" post_cell_id="0" post_segment_id="1" pre_cell_id="0" pre_segment_id="183">
          <nml:properties internal_delay="0.0018" synapse_type="mitral_granule_AMPA" weight="0.737620162884" />
          <nml:properties internal_delay="0.0018" synapse_type="mitral_granule_NMDA" weight="1.01464785678" />
        </nml:connection>
        <nml:connection id="2" post_cell_id="12" post_segment_id="1" pre_cell_id="0" pre_segment_id="168">
          <nml:properties internal_delay="0.0018" synapse_type="mitral_granule_AMPA" weight="2.40347065914" />
          <nml:properties internal_delay="0.0018" synapse_type="mitral_granule_NMDA" weight="2.68146919994" />
        </nml:connection>
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      </nml:connections>
    </nml:projection>
    <nml:projection name="mitral_granule_main_exc_joints" source="mitrals" target="granules_joints">
      <nml:synapse_props prop_delay="0.0018" synapse_type="mitral_granule_AMPA" threshold="-0.015" weight="1.0" />
      <nml:synapse_props prop_delay="0.0018" synapse_type="mitral_granule_NMDA" threshold="-0.015" weight="1.0" />
      <nml:connections size="1496">
        <nml:connection id="0" post_cell_id="0" post_segment_id="1" pre_cell_id="0" pre_segment_id="183">
          <nml:properties internal_delay="0.0018" synapse_type="mitral_granule_AMPA" weight="0.984479931145" />
          <nml:properties internal_delay="0.0018" synapse_type="mitral_granule_NMDA" weight="1.2493478796" />
        </nml:connection>
        <nml:connection id="2" post_cell_id="1" post_segment_id="1" pre_cell_id="0" pre_segment_id="183">
          <nml:properties internal_delay="0.0018" synapse_type="mitral_granule_AMPA" weight="1.17301405319" />
          <nml:properties internal_delay="0.0018" synapse_type="mitral_granule_NMDA" weight="0.65876214391" />
        </nml:connection>
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      </nml:connections>
    </nml:projection>
    <nml:projection name="mitral_granule_extra_exc_multis" source="mitrals" target="granules_multis">
      <nml:synapse_props prop_delay="0.0018" synapse_type="mitral_granule_AMPA" threshold="-0.015" weight="1.0" />
      <nml:synapse_props prop_delay="0.0018" synapse_type="mitral_granule_NMDA" threshold="-0.015" weight="1.0" />
      <nml:connections size="255">
        <nml:connection id="0" post_cell_id="0" post_segment_id="1" pre_cell_id="0" pre_segment_id="161">
          <nml:properties internal_delay="0.0018" synapse_type="mitral_granule_AMPA" weight="0.992521405384" />
          <nml:properties internal_delay="0.0018" synapse_type="mitral_granule_NMDA" weight="1.60303549461" />
        </nml:connection>
        <nml:connection id="2" post_cell_id="1" post_segment_id="1" pre_cell_id="0" pre_segment_id="18">
          <nml:properties internal_delay="0.0018" synapse_type="mitral_granule_AMPA" weight="0.994566882431" />
          <nml:properties internal_delay="0.0018" synapse_type="mitral_granule_NMDA" weight="1.07382867205" />
        </nml:connection>
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      </nml:connections>
    </nml:projection>
    <nml:projection name="mitral_granule_main_exc_multis" source="mitrals" target="granules_multis">
      <nml:synapse_props prop_delay="0.0018" synapse_type="mitral_granule_AMPA" threshold="-0.015" weight="1.0" />
      <nml:synapse_props prop_delay="0.0018" synapse_type="mitral_granule_NMDA" threshold="-0.015" weight="1.0" />
      <nml:connections size="96">
        <nml:connection id="0" post_cell_id="0" post_segment_id="1" pre_cell_id="0" pre_segment_id="161">
          <nml:properties internal_delay="0.0018" synapse_type="mitral_granule_AMPA" weight="0.846689441531" />
          <nml:properties internal_delay="0.0018" synapse_type="mitral_granule_NMDA" weight="0.68270988792" />
        </nml:connection>
        <nml:connection id="2" post_cell_id="0" post_segment_id="1" pre_cell_id="3" pre_segment_id="277">
          <nml:properties internal_delay="0.0018" synapse_type="mitral_granule_AMPA" weight="3.2691672185" />
          <nml:properties internal_delay="0.0018" synapse_type="mitral_granule_NMDA" weight="3.06708692149" />
        </nml:connection>
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      </nml:connections>
    </nml:projection>
    <nml:projection name="granule_mitral_inh_singles" source="granules_singles" target="mitrals">
      <nml:synapse_props prop_delay="0.0006" synapse_type="granule_mitral_GABA" threshold="-0.015" weight="1.0" />
      <nml:connections size="3840">
        <nml:connection id="0" post_cell_id="0" post_segment_id="189" pre_cell_id="0" pre_segment_id="1">
          <nml:properties internal_delay="0.0006" synapse_type="granule_mitral_GABA" weight="0.000299294557507" />
        </nml:connection>
        <nml:connection id="1" post_cell_id="0" post_segment_id="189" pre_cell_id="0" pre_segment_id="1">
          <nml:properties internal_delay="0.02643763044" synapse_type="granule_mitral_GABA" weight="0.000196516861644" />
        </nml:connection>
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      </nml:connections>
    </nml:projection>
    <nml:projection name="granule_mitral_inh_joints" source="granules_joints" target="mitrals">
      <nml:synapse_props prop_delay="0.0006" synapse_type="granule_mitral_GABA" threshold="-0.015" weight="1.0" />
      <nml:connections size="1496">
        <nml:connection id="0" post_cell_id="0" post_segment_id="183" pre_cell_id="0" pre_segment_id="1">
          <nml:properties internal_delay="0.0006" synapse_type="granule_mitral_GABA" weight="0.000221921203692" />
        </nml:connection>
        <nml:connection id="2" post_cell_id="0" post_segment_id="183" pre_cell_id="1" pre_segment_id="1">
          <nml:properties internal_delay="0.0006" synapse_type="granule_mitral_GABA" weight="0.000195876669632" />
        </nml:connection>
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      </nml:connections>
    </nml:projection>
    <nml:projection name="granule_mitral_inh_multis" source="granules_multis" target="mitrals">
      <nml:synapse_props prop_delay="0.0006" synapse_type="granule_mitral_GABA" threshold="-0.015" weight="1.0" />
      <nml:connections size="96">
        <nml:connection id="0" post_cell_id="0" post_segment_id="161" pre_cell_id="0" pre_segment_id="1">
          <nml:properties internal_delay="0.0006" synapse_type="granule_mitral_GABA" weight="1.47748874034" />
        </nml:connection>
        <nml:connection id="2" post_cell_id="3" post_segment_id="277" pre_cell_id="0" pre_segment_id="1">
          <nml:properties internal_delay="0.0006" synapse_type="granule_mitral_GABA" weight="0.084119768126" />
        </nml:connection>
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      </nml:connections>
    </nml:projection>
    <nml:projection name="granule_baseline_singles" source="files" target="granules_singles">
      <nml:synapse_props prop_delay="0.0018" synapse_type="mitral_granule_AMPA" threshold="0" weight="1.0" />
      <nml:synapse_props prop_delay="0.0018" synapse_type="mitral_granule_NMDA" threshold="0" weight="1.0" />
      <nml:connections size="384">
        <nml:connection id="0" post_cell_id="0" post_segment_id="1" pre_cell_id="file" pre_segment_id="41" />
        <nml:connection id="1" post_cell_id="1" post_segment_id="1" pre_cell_id="file" pre_segment_id="764" />
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      </nml:connections>
    </nml:projection>
    <nml:projection name="granule_baseline_joints" source="files" target="granules_joints">
      <nml:synapse_props prop_delay="0.0018" synapse_type="mitral_granule_AMPA" threshold="0" weight="1.0" />
      <nml:synapse_props prop_delay="0.0018" synapse_type="mitral_granule_NMDA" threshold="0" weight="1.0" />
      <nml:connections size="748">
        <nml:connection id="0" post_cell_id="0" post_segment_id="1" pre_cell_id="file" pre_segment_id="878" />
        <nml:connection id="1" post_cell_id="1" post_segment_id="1" pre_cell_id="file" pre_segment_id="185" />
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      </nml:connections>
    </nml:projection>
    <nml:projection name="granule_baseline_multis" source="files" target="granules_multis">
      <nml:synapse_props prop_delay="0.0018" synapse_type="mitral_granule_AMPA" threshold="0" weight="1.0" />
      <nml:synapse_props prop_delay="0.0018" synapse_type="mitral_granule_NMDA" threshold="0" weight="1.0" />
      <nml:connections size="32">
        <nml:connection id="0" post_cell_id="0" post_segment_id="1" pre_cell_id="file" pre_segment_id="15" />
        <nml:connection id="1" post_cell_id="1" post_segment_id="1" pre_cell_id="file" pre_segment_id="917" />
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      </nml:connections>
    </nml:projection>
    <nml:projection name="mitral_PG" source="mitrals" target="PGs">
      <nml:synapse_props prop_delay="0.0018" synapse_type="mitral_PG" threshold="-0.015" weight="1.0" />
      <nml:connections size="8770">
        <nml:connection id="48" post_cell_id="2" post_segment_id="2" pre_cell_id="0" pre_segment_id="98">
          <nml:properties internal_delay="0.0251219474641" synapse_type="mitral_PG" weight="0.86914882316" />
        </nml:connection>
        <nml:connection id="49" post_cell_id="2" post_segment_id="2" pre_cell_id="0" pre_segment_id="98">
          <nml:properties internal_delay="0.0168082840111" synapse_type="mitral_PG" weight="1.05543726947" />
        </nml:connection>
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      </nml:connections>
    </nml:projection>
    <nml:projection name="PG_mitral" source="PGs" target="mitrals">
      <nml:synapse_props prop_delay="0.0006" synapse_type="PG_mitral" threshold="-0.015" weight="1.0" />
      <nml:connections size="400">
        <nml:connection id="2" post_cell_id="0" post_segment_id="98" pre_cell_id="2" pre_segment_id="2">
          <nml:properties internal_delay="0.0474693745684" synapse_type="PG_mitral" weight="0.899544481056" />
        </nml:connection>
        <nml:connection id="3" post_cell_id="0" post_segment_id="37" pre_cell_id="3" pre_segment_id="2">
          <nml:properties internal_delay="0.18022331436" synapse_type="PG_mitral" weight="0.54291013067" />
        </nml:connection>
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      </nml:connections>
    </nml:projection>
    <nml:projection name="ORN_mitral" source="file" target="mitrals">
      <nml:synapse_props prop_delay="0.0" synapse_type="ORN_mitral" threshold="0" weight="1" />
      <nml:connections size="366">
        <nml:connection id="0" post_cell_id="0" post_segment_id="24" pre_cell_id="file" pre_segment_id="715_819_619_240_18_882" />
        <nml:connection id="1" post_cell_id="0" post_segment_id="25" pre_cell_id="file" pre_segment_id="697_702_86" />
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      </nml:connections>
    </nml:projection>
    <nml:projection name="ORN_PG" source="file" target="PGs">
      <nml:synapse_props prop_delay="0.0" synapse_type="ORN_PG" threshold="0" weight="1" />
      <nml:connections size="736">
        <nml:connection id="100" post_cell_id="2" post_segment_id="1" pre_cell_id="file" pre_segment_id="401_379_729_691_752_638_738_280_276_384_139_602_882_805_259_589_444_517_122_621_706_89" />
        <nml:connection id="101" post_cell_id="2" post_segment_id="2" pre_cell_id="file" pre_segment_id="852_849_746_620_123_816_673_507_567_686_24_845_144_693_467_543_793_452_731_389_531_923_536_977_60_655_868_857" />
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      </nml:connections>
    </nml:projection>
  </nml:projections>
</neuroml:neuroml>
