<neuroml:neuroml xmlns:bio="http://morphml.org/biophysics/schema" xmlns:meta="http://morphml.org/metadata/schema" xmlns:mml="http://morphml.org/morphml/schema" xmlns:neuroml="http://morphml.org/neuroml/schema" xmlns:nml="http://morphml.org/networkml/schema" xmlns:xsi="http://www.w3.org/2001/XMLSchema-instance" lengthUnits="micrometer" xsi:schemaLocation="http://morphml.org/neuroml/schema">
  <neuroml:cells>
    <neuroml:cell name="mitral">
      <meta:notes>Cell: soma exported from NEURON ModelView</meta:notes>
      <mml:segments>
        <mml:segment cable="0" id="0" name="Seg0_soma">
          <mml:proximal diameter="32" x="0" y="0" z="0" />
          <mml:distal diameter="32" x="32" y="0" z="0" />
        </mml:segment>
        <mml:segment cable="253" id="254" name="Seg0_sec_dendp4_0" parent="0">
          <mml:proximal diameter="5.8" x="0" y="0" z="0" />
          <mml:distal diameter="5.8" x="0" y="-25.9808" z="15" />
        </mml:segment>
        <mml:segment cable="200" id="201" name="Seg0_sec_dendp3_0" parent="0">
          <mml:proximal diameter="5.8" x="0" y="0" z="0" />
          <mml:distal diameter="5.8" x="-25.9808" y="3.18173e-15" z="15" />
        </mml:segment>
        <mml:segment cable="157" id="158" name="Seg0_sec_dendp2_0" parent="0">
          <mml:proximal diameter="5.8" x="0" y="0" z="0" />
          <mml:distal diameter="5.8" x="0" y="25.9808" z="15" />
        </mml:segment>
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      </mml:segments>
      <mml:cables>
        <mml:cable fract_along_parent="0" id="0" name="soma" />
        <mml:cable fract_along_parent="0" id="253" name="sec_dendp4_0" />
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        <mml:cablegroup name="ModelViewParmSubset_0">
          <mml:cable id="0" />
          <mml:cable id="253" />
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        </mml:cablegroup>
        <mml:cablegroup name="ModelViewParmSubset_1">
          <mml:cable id="0" />
          <mml:cable id="253" />
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        </mml:cablegroup>
        <mml:cablegroup name="ModelViewParmSubset_2">
          <mml:cable id="0" />
          <mml:cable id="253" />
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        </mml:cablegroup>
        <mml:cablegroup name="ModelViewParmSubset_3">
          <mml:cable id="0" />
          <mml:cable id="1" />
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        </mml:cablegroup>
        <mml:cablegroup name="ModelViewParmSubset_4">
          <mml:cable id="253" />
          <mml:cable id="200" />
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        </mml:cablegroup>
        <mml:cablegroup name="ModelViewParmSubset_5">
          <mml:cable id="110" />
          <mml:cable id="109" />
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        </mml:cablegroup>
        <mml:cablegroup name="ModelViewParmSubset_6">
          <mml:cable id="113" />
          <mml:cable id="100" />
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        </mml:cablegroup>
        <mml:cablegroup name="ModelViewParmSubset_7">
          <mml:cable id="111" />
          <mml:cable id="106" />
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        </mml:cablegroup>
        <mml:cablegroup name="ModelViewParmSubset_8">
          <mml:cable id="105" />
          <mml:cable id="104" />
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        </mml:cablegroup>
        <mml:cablegroup name="ModelViewParmSubset_9">
          <mml:cable id="103" />
          <mml:cable id="94" />
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        </mml:cablegroup>
        <mml:cablegroup name="ModelViewParmSubset_10">
          <mml:cable id="285" />
          <mml:cable id="252" />
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        </mml:cablegroup>
        <mml:cablegroup name="ModelViewParmSubset_11">
          <mml:cable id="284" />
          <mml:cable id="251" />
          <mml:cable id="198" />
          <mml:cable id="155" />
        </mml:cablegroup>
        <mml:cablegroup name="ModelViewParmSubset_12">
          <mml:cable id="283" />
          <mml:cable id="250" />
          <mml:cable id="197" />
          <mml:cable id="154" />
        </mml:cablegroup>
        <mml:cablegroup name="ModelViewParmSubset_13">
          <mml:cable id="5" />
          <mml:cable id="101" />
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        </mml:cablegroup>
        <mml:cablegroup name="ModelViewParmSubset_14">
          <mml:cable id="282" />
          <mml:cable id="249" />
          <mml:cable id="196" />
          <mml:cable id="153" />
        </mml:cablegroup>
        <mml:cablegroup name="ModelViewParmSubset_15">
          <mml:cable id="281" />
          <mml:cable id="248" />
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        </mml:cablegroup>
        <mml:cablegroup name="ModelViewParmSubset_16">
          <mml:cable id="91" />
          <mml:cable id="68" />
          <mml:cable id="44" />
          <mml:cable id="21" />
        </mml:cablegroup>
        <mml:cablegroup name="ModelViewParmSubset_17">
          <mml:cable id="257" />
          <mml:cable id="204" />
          <mml:cable id="161" />
          <mml:cable id="118" />
        </mml:cablegroup>
        <mml:cablegroup name="ModelViewParmSubset_18">
          <mml:cable id="256" />
          <mml:cable id="203" />
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        </mml:cablegroup>
        <mml:cablegroup name="ModelViewParmSubset_19">
          <mml:cable id="117" />
          <mml:cable id="121" />
        </mml:cablegroup>
        <mml:cablegroup name="ModelViewParmSubset_20">
          <mml:cable id="67" />
          <mml:cable id="20" />
        </mml:cablegroup>
        <mml:cablegroup name="ModelViewParmSubset_21">
          <mml:cable id="254" />
          <mml:cable id="201" />
          <mml:cable id="158" />
          <mml:cable id="115" />
        </mml:cablegroup>
        <mml:cablegroup name="ModelViewParmSubset_22">
          <mml:cable id="253" />
          <mml:cable id="200" />
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        </mml:cablegroup>
        <mml:cablegroup name="ModelViewParmSubset_23">
          <mml:cable id="1" />
          <mml:cable id="2" />
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        </mml:cablegroup>
        <mml:cablegroup name="ModelViewParmSubset_24">
          <mml:cable id="14" />
          <mml:cable id="15" />
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        </mml:cablegroup>
        <mml:cablegroup name="ModelViewParmSubset_25">
          <mml:cable id="11" />
          <mml:cable id="12" />
          <mml:cable id="13" />
        </mml:cablegroup>
        <mml:cablegroup name="ModelViewParmSubset_26">
          <mml:cable id="276" />
          <mml:cable id="261" />
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        </mml:cablegroup>
        <mml:cablegroup name="ModelViewParmSubset_27">
          <mml:cable id="253" />
          <mml:cable id="200" />
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        </mml:cablegroup>
        <mml:cablegroup name="ModelViewParmSubset_28">
          <mml:cable id="6" />
          <mml:cable id="7" />
          <mml:cable id="8" />
          <mml:cable id="9" />
        </mml:cablegroup>
        <mml:cablegroup name="ModelViewParmSubset_29">
          <mml:cable id="3" />
          <mml:cable id="4" />
          <mml:cable id="5" />
        </mml:cablegroup>
        <mml:cablegroup name="ModelViewParmSubset_30">
          <mml:cable id="1" />
          <mml:cable id="2" />
        </mml:cablegroup>
        <mml:cablegroup name="ModelViewParmSubset_31">
          <mml:cable id="0" />
          <mml:cable id="67" />
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        </mml:cablegroup>
        <mml:cablegroup name="ModelViewParmSubset_32">
          <mml:cable id="67" />
          <mml:cable id="20" />
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        </mml:cablegroup>
        <mml:cablegroup name="ModelViewParmSubset_33">
          <mml:cable id="12" />
          <mml:cable id="13" />
        </mml:cablegroup>
        <mml:cablegroup name="ModelViewParmSubset_34">
          <mml:cable id="6" />
          <mml:cable id="7" />
        </mml:cablegroup>
        <mml:cablegroup name="OneSecGrp_SectionRef_1">
          <mml:cable id="0" />
        </mml:cablegroup>
        <mml:cablegroup name="OneSecGrp_SectionRef_29">
          <mml:cable id="4" />
        </mml:cablegroup>
        <mml:cablegroup name="OneSecGrp_SectionRef_48">
          <mml:cable id="19" />
        </mml:cablegroup>
        <mml:cablegroup name="OneSecGrp_SectionRef_19">
          <mml:cable id="3" />
        </mml:cablegroup>
        <mml:cablegroup name="OneSecGrp_SectionRef_38">
          <mml:cable id="18" />
        </mml:cablegroup>
        <mml:cablegroup name="OneSecGrp_SectionRef_28">
          <mml:cable id="17" />
        </mml:cablegroup>
        <mml:cablegroup name="OneSecGrp_SectionRef_18">
          <mml:cable id="16" />
        </mml:cablegroup>
        <mml:cablegroup name="OneSecGrp_SectionRef_13">
          <mml:cable id="2" />
        </mml:cablegroup>
        <mml:cablegroup name="OneSecGrp_SectionRef_12">
          <mml:cable id="15" />
        </mml:cablegroup>
        <mml:cablegroup name="OneSecGrp_SectionRef_6">
          <mml:cable id="14" />
        </mml:cablegroup>
        <mml:cablegroup name="OneSecGrp_SectionRef_7">
          <mml:cable id="1" />
        </mml:cablegroup>
        <mml:cablegroup name="OneSecGrp_SectionRef_115">
          <mml:cable id="10" />
        </mml:cablegroup>
        <mml:cablegroup name="OneSecGrp_SectionRef_140">
          <mml:cable id="11" />
        </mml:cablegroup>
        <mml:cablegroup name="OneSecGrp_SectionRef_90">
          <mml:cable id="9" />
        </mml:cablegroup>
        <mml:cablegroup name="OneSecGrp_SectionRef_73">
          <mml:cable id="8" />
        </mml:cablegroup>
      </mml:cables>
      <neuroml:biophysics units="Physiological Units">
        <bio:mechanism name="pas" passive_conductance="true" type="Channel Mechanism">
          <bio:parameter name="gmax" value="0.05">
            <bio:group>ModelViewParmSubset_4</bio:group>
          </bio:parameter>
          <bio:parameter name="gmax" value="0.05">
            <bio:group>OneSecGrp_SectionRef_1</bio:group>
          </bio:parameter>
          <bio:parameter name="e" value="-58">
            <bio:group>all</bio:group>
          </bio:parameter>
        </bio:mechanism>
        <bio:mechanism name="Ca_mit_conc" type="Ion Concentration">
          <bio:parameter name="depth" value="0.125">
            <bio:group>ModelViewParmSubset_5</bio:group>
          </bio:parameter>
          <bio:parameter name="depth" value="0.175">
            <bio:group>ModelViewParmSubset_6</bio:group>
          </bio:parameter>
          <bio:parameter name="depth" value="0.2">
            <bio:group>ModelViewParmSubset_7</bio:group>
          </bio:parameter>
          <bio:parameter name="depth" value="0.225">
            <bio:group>ModelViewParmSubset_8</bio:group>
          </bio:parameter>
          <bio:parameter name="depth" value="0.25">
            <bio:group>ModelViewParmSubset_9</bio:group>
          </bio:parameter>
          <bio:parameter name="depth" value="0.375">
            <bio:group>ModelViewParmSubset_10</bio:group>
          </bio:parameter>
          <bio:parameter name="depth" value="0.4">
            <bio:group>ModelViewParmSubset_11</bio:group>
          </bio:parameter>
          <bio:parameter name="depth" value="0.45">
            <bio:group>ModelViewParmSubset_12</bio:group>
          </bio:parameter>
          <bio:parameter name="depth" value="0.5">
            <bio:group>ModelViewParmSubset_13</bio:group>
          </bio:parameter>
          <bio:parameter name="depth" value="0.55">
            <bio:group>ModelViewParmSubset_14</bio:group>
          </bio:parameter>
          <bio:parameter name="depth" value="0.675">
            <bio:group>ModelViewParmSubset_15</bio:group>
          </bio:parameter>
          <bio:parameter name="depth" value="0.7">
            <bio:group>ModelViewParmSubset_16</bio:group>
          </bio:parameter>
          <bio:parameter name="depth" value="0.725">
            <bio:group>ModelViewParmSubset_17</bio:group>
          </bio:parameter>
          <bio:parameter name="depth" value="0.75">
            <bio:group>OneSecGrp_SectionRef_29</bio:group>
          </bio:parameter>
          <bio:parameter name="depth" value="0.775">
            <bio:group>ModelViewParmSubset_18</bio:group>
          </bio:parameter>
          <bio:parameter name="depth" value="0.8">
            <bio:group>ModelViewParmSubset_19</bio:group>
          </bio:parameter>
          <bio:parameter name="depth" value="0.875">
            <bio:group>ModelViewParmSubset_20</bio:group>
          </bio:parameter>
          <bio:parameter name="depth" value="1.175">
            <bio:group>OneSecGrp_SectionRef_48</bio:group>
          </bio:parameter>
          <bio:parameter name="depth" value="1.25">
            <bio:group>OneSecGrp_SectionRef_19</bio:group>
          </bio:parameter>
          <bio:parameter name="depth" value="1.325">
            <bio:group>OneSecGrp_SectionRef_38</bio:group>
          </bio:parameter>
          <bio:parameter name="depth" value="1.4">
            <bio:group>ModelViewParmSubset_21</bio:group>
          </bio:parameter>
          <bio:parameter name="depth" value="1.45">
            <bio:group>ModelViewParmSubset_22</bio:group>
          </bio:parameter>
          <bio:parameter name="depth" value="1.5">
            <bio:group>OneSecGrp_SectionRef_28</bio:group>
          </bio:parameter>
          <bio:parameter name="depth" value="1.65">
            <bio:group>OneSecGrp_SectionRef_18</bio:group>
          </bio:parameter>
          <bio:parameter name="depth" value="1.75">
            <bio:group>OneSecGrp_SectionRef_13</bio:group>
          </bio:parameter>
          <bio:parameter name="depth" value="1.825">
            <bio:group>OneSecGrp_SectionRef_12</bio:group>
          </bio:parameter>
          <bio:parameter name="depth" value="1.975">
            <bio:group>OneSecGrp_SectionRef_6</bio:group>
          </bio:parameter>
          <bio:parameter name="depth" value="2.5">
            <bio:group>OneSecGrp_SectionRef_7</bio:group>
          </bio:parameter>
          <bio:parameter name="depth" value="8">
            <bio:group>OneSecGrp_SectionRef_1</bio:group>
          </bio:parameter>
          <bio:parameter name="ica" value="0">
            <bio:group>ModelViewParmSubset_2</bio:group>
          </bio:parameter>
        </bio:mechanism>
        <bio:mechanism name="KA_bsg_yka" type="Channel Mechanism">
          <bio:parameter name="gmax" value="5.15">
            <bio:group>ModelViewParmSubset_23</bio:group>
          </bio:parameter>
          <bio:parameter name="gmax" value="5.87">
            <bio:group>OneSecGrp_SectionRef_1</bio:group>
          </bio:parameter>
        </bio:mechanism>
        <bio:mechanism name="Kca_mit_usb" type="Channel Mechanism">
          <bio:parameter name="gmax" value="8.87">
            <bio:group>ModelViewParmSubset_23</bio:group>
          </bio:parameter>
          <bio:parameter name="gmax" value="14.2">
            <bio:group>OneSecGrp_SectionRef_1</bio:group>
          </bio:parameter>
        </bio:mechanism>
        <bio:mechanism name="K2_mit_usb" type="Channel Mechanism">
          <bio:parameter name="gmax" value="50.0">
            <bio:group>ModelViewParmSubset_24</bio:group>
          </bio:parameter>
          <bio:parameter name="gmax" value="10.0">
            <bio:group>ModelViewParmSubset_32</bio:group>
          </bio:parameter>
          <bio:parameter name="gmax" value="7.7">
            <bio:group>ModelViewParmSubset_25</bio:group>
          </bio:parameter>
          <bio:parameter name="gmax" value="12.8">
            <bio:group>ModelViewParmSubset_26</bio:group>
          </bio:parameter>
          <bio:parameter name="gmax" value="22.6">
            <bio:group>ModelViewParmSubset_27</bio:group>
          </bio:parameter>
          <bio:parameter name="gmax" value="38.5">
            <bio:group>OneSecGrp_SectionRef_115</bio:group>
          </bio:parameter>
          <bio:parameter name="gmax" value="77.1">
            <bio:group>ModelViewParmSubset_28</bio:group>
          </bio:parameter>
          <bio:parameter name="gmax" value="115.6">
            <bio:group>ModelViewParmSubset_29</bio:group>
          </bio:parameter>
          <bio:parameter name="gmax" value="154.1">
            <bio:group>ModelViewParmSubset_30</bio:group>
          </bio:parameter>
          <bio:parameter name="gmax" value="195.6">
            <bio:group>OneSecGrp_SectionRef_1</bio:group>
          </bio:parameter>
          <bio:parameter name="gmax" value="200.0">
            <bio:group>OneSecGrp_SectionRef_13</bio:group>
          </bio:parameter>
        </bio:mechanism>
        <bio:mechanism name="K_mit_usb" type="Channel Mechanism">
          <bio:parameter name="gmax" value="0.85">
            <bio:group>ModelViewParmSubset_27</bio:group>
          </bio:parameter>
          <bio:parameter name="gmax" value="1.55">
            <bio:group>ModelViewParmSubset_23</bio:group>
          </bio:parameter>
          <bio:parameter name="gmax" value="1.74">
            <bio:group>ModelViewParmSubset_24</bio:group>
          </bio:parameter>
          <bio:parameter name="gmax" value="2.8">
            <bio:group>ModelViewParmSubset_31</bio:group>
          </bio:parameter>
        </bio:mechanism>
        <bio:mechanism name="LCa3_mit_usb" type="Channel Mechanism">
          <bio:parameter name="gmax" value="0.4">
            <bio:group>ModelViewParmSubset_27</bio:group>
          </bio:parameter>
          <bio:parameter name="gmax" value="2">
            <bio:group>ModelViewParmSubset_23</bio:group>
          </bio:parameter>
          <bio:parameter name="gmax" value="2.2">
            <bio:group>ModelViewParmSubset_24</bio:group>
          </bio:parameter>
          <bio:parameter name="gmax" value="4">
            <bio:group>OneSecGrp_SectionRef_1</bio:group>
          </bio:parameter>
          <bio:parameter name="gmax" value="9.5">
            <bio:group>ModelViewParmSubset_32</bio:group>
          </bio:parameter>
        </bio:mechanism>
        <bio:mechanism name="Na_mit_ms" type="Channel Mechanism">
          <bio:parameter name="gmax" value="50.0">
            <bio:group>ModelViewParmSubset_24</bio:group>
          </bio:parameter>
          <bio:parameter name="gmax" value="10.0">
            <bio:group>ModelViewParmSubset_32</bio:group>
          </bio:parameter>
          <bio:parameter name="gmax" value="11.7">
            <bio:group>ModelViewParmSubset_33</bio:group>
          </bio:parameter>
          <bio:parameter name="gmax" value="12.2">
            <bio:group>ModelViewParmSubset_26</bio:group>
          </bio:parameter>
          <bio:parameter name="gmax" value="153.2">
            <bio:group>OneSecGrp_SectionRef_1</bio:group>
          </bio:parameter>
          <bio:parameter name="gmax" value="23.4">
            <bio:group>OneSecGrp_SectionRef_140</bio:group>
          </bio:parameter>
          <bio:parameter name="gmax" value="33">
            <bio:group>ModelViewParmSubset_27</bio:group>
          </bio:parameter>
          <bio:parameter name="gmax" value="58.6">
            <bio:group>OneSecGrp_SectionRef_115</bio:group>
          </bio:parameter>
          <bio:parameter name="gmax" value="117">
            <bio:group>OneSecGrp_SectionRef_90</bio:group>
          </bio:parameter>
          <bio:parameter name="gmax" value="234">
            <bio:group>OneSecGrp_SectionRef_73</bio:group>
          </bio:parameter>
          <bio:parameter name="gmax" value="351.1">
            <bio:group>ModelViewParmSubset_34</bio:group>
          </bio:parameter>
          <bio:parameter name="gmax" value="468.1">
            <bio:group>ModelViewParmSubset_23</bio:group>
          </bio:parameter>
        </bio:mechanism>
        <bio:mechanism name="Na_mit_initialsegment_ms" type="Channel Mechanism">
          <bio:parameter name="gmax" value="500.0">
            <bio:group>OneSecGrp_SectionRef_13</bio:group>
          </bio:parameter>
        </bio:mechanism>
        <bio:spec_capacitance>
          <bio:parameter value="1">
            <bio:group>all</bio:group>
          </bio:parameter>
        </bio:spec_capacitance>
        <bio:spec_axial_resistance>
          <bio:parameter value="0.2">
            <bio:group>all</bio:group>
          </bio:parameter>
        </bio:spec_axial_resistance>
        <bio:init_memb_potential>
          <bio:parameter value="-58">
            <bio:group>all</bio:group>
          </bio:parameter>
        </bio:init_memb_potential>
      </neuroml:biophysics>
      <neuroml:connectivity>
        <nml:potential_syn_loc synapse_direction="post" synapse_type="ORN_mitral">
          <nml:group>ModelViewParmSubset_32</nml:group>
        </nml:potential_syn_loc>
        <nml:potential_syn_loc synapse_direction="post" synapse_type="PG_mitral">
          <nml:group>ModelViewParmSubset_32</nml:group>
        </nml:potential_syn_loc>
        <nml:potential_syn_loc synapse_direction="post" synapse_type="granule_mitral">
          <nml:group>ModelViewParmSubset_26</nml:group>
          <nml:group>ModelViewParmSubset_27</nml:group>
          <nml:group>ModelViewParmSubset_24</nml:group>
          <nml:group>OneSecGrp_SectionRef_1</nml:group>
        </nml:potential_syn_loc>
      </neuroml:connectivity>
    </neuroml:cell>
    <neuroml:cell name="granule">
      <meta:notes>Cell: granule morphml written by hand by Aditya.</meta:notes>
      <mml:segments>
        <mml:segment cable="0" id="0" name="soma">
          <mml:proximal diameter="8" x="0" y="0" z="0" />
          <mml:distal diameter="8" x="0" y="0" z="8" />
        </mml:segment>
        <mml:segment cable="1" id="1" name="periphery" parent="0">
          <mml:proximal diameter="0.5" x="0" y="0" z="8" />
          <mml:distal diameter="0.5" x="0" y="0" z="258" />
        </mml:segment>
      </mml:segments>
      <mml:cables>
        <mml:cable fract_along_parent="0" id="0" name="soma" />
        <mml:cable fract_along_parent="1" id="1" name="periphery" />
        <mml:cablegroup name="all">
          <mml:cable id="0" />
          <mml:cable id="1" />
        </mml:cablegroup>
        <mml:cablegroup name="soma">
          <mml:cable id="0" />
        </mml:cablegroup>
        <mml:cablegroup name="periphery">
          <mml:cable id="1" />
        </mml:cablegroup>
      </mml:cables>
      <neuroml:biophysics units="Physiological Units">
        <bio:mechanism name="pas" passive_conductance="true" type="Channel Mechanism">
          <bio:parameter name="gmax" value="0.13333">
            <bio:group>all</bio:group>
          </bio:parameter>
          <bio:parameter name="e" value="-65">
            <bio:group>all</bio:group>
          </bio:parameter>
        </bio:mechanism>
        <bio:mechanism name="Na_rat_ms" type="Channel Mechanism">
          <bio:parameter name="gmax" value="25">
            <bio:group>soma</bio:group>
          </bio:parameter>
          <bio:parameter name="gmax" value="10">
            <bio:group>periphery</bio:group>
          </bio:parameter>
        </bio:mechanism>
        <bio:mechanism name="K2_mit_usb" type="Channel Mechanism">
          <bio:parameter name="gmax" value="10">
            <bio:group>soma</bio:group>
          </bio:parameter>
          <bio:parameter name="gmax" value="5">
            <bio:group>periphery</bio:group>
          </bio:parameter>
          <bio:parameter name="e" value="-80">
            <bio:group>all</bio:group>
          </bio:parameter>
        </bio:mechanism>
        <bio:mechanism name="KA_ms" type="Channel Mechanism">
          <bio:parameter name="gmax" value="15">
            <bio:group>soma</bio:group>
          </bio:parameter>
          <bio:parameter name="gmax" value="10.0">
            <bio:group>periphery</bio:group>
          </bio:parameter>
          <bio:parameter name="e" value="-80">
            <bio:group>all</bio:group>
          </bio:parameter>
        </bio:mechanism>
        <bio:spec_capacitance>
          <bio:parameter value="4">
            <bio:group>all</bio:group>
          </bio:parameter>
        </bio:spec_capacitance>
        <bio:spec_axial_resistance>
          <bio:parameter value="0.08">
            <bio:group>all</bio:group>
          </bio:parameter>
        </bio:spec_axial_resistance>
        <bio:init_memb_potential>
          <bio:parameter value="-65">
            <bio:group>all</bio:group>
          </bio:parameter>
        </bio:init_memb_potential>
      </neuroml:biophysics>
      <neuroml:connectivity>
        <nml:potential_syn_loc synapse_direction="post" synapse_type="mitral_granule">
          <nml:group>periphery</nml:group>
        </nml:potential_syn_loc>
        <nml:potential_syn_loc synapse_direction="pre" synapse_type="granule_mitral">
          <nml:group>periphery</nml:group>
        </nml:potential_syn_loc>
      </neuroml:connectivity>
    </neuroml:cell>
    <neuroml:cell name="PG">
      <meta:notes>Cell: periglomerular morphml written by hand by Aditya Gilra, NCBS, Bangalore, India.</meta:notes>
      <mml:segments>
        <mml:segment cable="0" id="0" name="soma">
          <mml:proximal diameter="8" x="0" y="0" z="0" />
          <mml:distal diameter="8" x="8" y="0" z="0" />
        </mml:segment>
        <mml:segment cable="1" id="1" name="dend0" parent="0">
          <mml:proximal diameter="1" x="8" y="0" z="0" />
          <mml:distal diameter="1" x="28" y="0" z="0" />
        </mml:segment>
        <mml:segment cable="2" id="2" name="dend1" parent="0">
          <mml:proximal diameter="1" x="8" y="0" z="0" />
          <mml:distal diameter="1" x="8" y="20" z="0" />
        </mml:segment>
      </mml:segments>
      <mml:cables>
        <mml:cable id="0" name="soma" />
        <mml:cable id="1" name="dend0" />
        <mml:cable id="2" name="dend1" />
        <mml:cablegroup name="all">
          <mml:cable id="0" />
          <mml:cable id="1" />
          <mml:cable id="2" />
        </mml:cablegroup>
        <mml:cablegroup name="somagroup">
          <mml:cable id="0" />
        </mml:cablegroup>
        <mml:cablegroup name="dendrites">
          <mml:cable id="1" />
          <mml:cable id="2" />
        </mml:cablegroup>
        <mml:cablegroup name="ORNdendrite">
          <mml:cable id="1" />
        </mml:cablegroup>
        <mml:cablegroup name="periphery">
          <mml:cable id="1" />
          <mml:cable id="2" />
        </mml:cablegroup>
      </mml:cables>
      <neuroml:biophysics units="Physiological Units">
        <bio:mechanism name="pas" passive_conductance="true" type="Channel Mechanism">
          <bio:parameter name="gmax" value="0.5">
            <bio:group>all</bio:group>
          </bio:parameter>
          <bio:parameter name="e" value="-67">
            <bio:group>all</bio:group>
          </bio:parameter>
        </bio:mechanism>
        <bio:mechanism name="Na_rat_ms" type="Channel Mechanism">
          <bio:parameter name="gmax" value="20">
            <bio:group>somagroup</bio:group>
          </bio:parameter>
          <bio:parameter name="gmax" value="5">
            <bio:group>periphery</bio:group>
          </bio:parameter>
        </bio:mechanism>
        <bio:mechanism name="K2_mit_usb" type="Channel Mechanism">
          <bio:parameter name="gmax" value="40">
            <bio:group>somagroup</bio:group>
          </bio:parameter>
          <bio:parameter name="gmax" value="20">
            <bio:group>periphery</bio:group>
          </bio:parameter>
          <bio:parameter name="e" value="-80">
            <bio:group>all</bio:group>
          </bio:parameter>
        </bio:mechanism>
        <bio:mechanism name="Ih_cb" type="Channel Mechanism">
          <bio:parameter name="gmax" value="0.3">
            <bio:group>somagroup</bio:group>
          </bio:parameter>
          <bio:parameter name="gmax" value="0.1">
            <bio:group>periphery</bio:group>
          </bio:parameter>
        </bio:mechanism>
        <bio:mechanism name="TCa_d" type="Channel Mechanism">
          <bio:parameter name="gmax" value="3.0">
            <bio:group>somagroup</bio:group>
          </bio:parameter>
          <bio:parameter name="gmax" value="1.0">
            <bio:group>periphery</bio:group>
          </bio:parameter>
        </bio:mechanism>
        <bio:mechanism name="KA_bsg_yka" type="Channel Mechanism">
          <bio:parameter name="gmax" value="5.0">
            <bio:group>somagroup</bio:group>
          </bio:parameter>
          <bio:parameter name="gmax" value="5.0">
            <bio:group>periphery</bio:group>
          </bio:parameter>
          <bio:parameter name="e" value="-80">
            <bio:group>all</bio:group>
          </bio:parameter>
        </bio:mechanism>
        <bio:mechanism name="Ca_mit_conc" type="Ion Concentration">
          <bio:parameter name="depth" value="0.125">
            <bio:group>somagroup</bio:group>
          </bio:parameter>
          <bio:parameter name="depth" value="0.125">
            <bio:group>dendrites</bio:group>
          </bio:parameter>
        </bio:mechanism>
        <bio:spec_capacitance>
          <bio:parameter value="1.0">
            <bio:group>all</bio:group>
          </bio:parameter>
        </bio:spec_capacitance>
        <bio:spec_axial_resistance>
          <bio:parameter value="0.2">
            <bio:group>all</bio:group>
          </bio:parameter>
        </bio:spec_axial_resistance>
        <bio:init_memb_potential>
          <bio:parameter value="-65">
            <bio:group>all</bio:group>
          </bio:parameter>
        </bio:init_memb_potential>
      </neuroml:biophysics>
      <neuroml:connectivity>
        <nml:potential_syn_loc synapse_direction="post" synapse_type="ORN_PG">
          <nml:group>dendrites</nml:group>
        </nml:potential_syn_loc>
        <nml:potential_syn_loc synapse_direction="post" synapse_type="mitral_PG">
          <nml:group>dendrites</nml:group>
        </nml:potential_syn_loc>
        <nml:potential_syn_loc synapse_direction="pre" synapse_type="PG_mitral">
          <nml:group>dendrites</nml:group>
        </nml:potential_syn_loc>
        <nml:potential_syn_loc synapse_direction="post" synapse_type="SA_PG">
          <nml:group>dendrites</nml:group>
        </nml:potential_syn_loc>
      </neuroml:connectivity>
    </neuroml:cell>
  </neuroml:cells>
  <meta:notes>
		Fully instantiated network model of Olfactory Bulb by Aditya Gilra, NCBS, Bangalore, India, 2010.
	</meta:notes>
  <nml:populations>
    <nml:population cell_type="mitral" name="mitrals">
      <nml:instances size="4">
        <nml:instance id="0">
          <nml:location x="0.0" y="0.0" z="300.0" />
          <meta:notes>
						zrotation=0.915266923378
					</meta:notes>
        </nml:instance>
        <nml:instance id="3">
          <nml:location x="54.3937262474" y="-1.36000396892" z="300.0" />
          <meta:notes>
						zrotation=4.41914800411
					</meta:notes>
        </nml:instance>
      </nml:instances>
    </nml:population>
    <nml:population cell_type="granule" name="granules_singles">
      <nml:instances size="78">
        <nml:instance id="1">
          <nml:location x="-574.0" y="64.0" z="0.0" />
        </nml:instance>
        <nml:instance id="3">
          <nml:location x="-440.0" y="98.0" z="0.0" />
        </nml:instance>
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      </nml:instances>
    </nml:population>
    <nml:population cell_type="granule" name="granules_joints">
      <nml:instances size="668">
        <nml:instance id="0">
          <nml:location x="-704.0" y="-98.0" z="0.0" />
        </nml:instance>
        <nml:instance id="1">
          <nml:location x="-644.0" y="-78.0" z="0.0" />
        </nml:instance>
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      </nml:instances>
    </nml:population>
    <nml:population cell_type="granule" name="granules_multis">
      <nml:instances size="87">
        <nml:instance id="0">
          <nml:location x="-48.0" y="26.0" z="0.0" />
        </nml:instance>
        <nml:instance id="1">
          <nml:location x="-40.0" y="0.0" z="0.0" />
        </nml:instance>
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      </nml:instances>
    </nml:population>
    <nml:population cell_type="PG" name="PGs">
      <nml:instances size="368">
        <nml:instance id="2">
          <nml:location x="-100.0" y="45.4647723677" z="1050.0" />
        </nml:instance>
        <nml:instance id="3">
          <nml:location x="-93.6754446797" y="-100.0" z="1050.0" />
        </nml:instance>
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      </nml:instances>
    </nml:population>
  </nml:populations>
  <nml:projections units="SI Units">
    <nml:projection name="mitral_granule_extra_exc_singles" source="mitrals" target="granules_singles">
      <nml:synapse_props prop_delay="0.0018" synapse_type="mitral_granule_AMPA" threshold="-0.015" weight="1.0" />
      <nml:synapse_props prop_delay="0.0018" synapse_type="mitral_granule_NMDA" threshold="-0.015" weight="1.0" />
      <nml:connections size="79">
        <nml:connection id="2" post_cell_id="17" post_segment_id="1" pre_cell_id="0" pre_segment_id="161">
          <nml:properties internal_delay="0.0018" synapse_type="mitral_granule_AMPA" weight="0.974307364762" />
          <nml:properties internal_delay="0.0018" synapse_type="mitral_granule_NMDA" weight="1.23288315494" />
        </nml:connection>
        <nml:connection id="3" post_cell_id="18" post_segment_id="1" pre_cell_id="3" pre_segment_id="257">
          <nml:properties internal_delay="0.0018" synapse_type="mitral_granule_AMPA" weight="1.01507847033" />
          <nml:properties internal_delay="0.0018" synapse_type="mitral_granule_NMDA" weight="1.19109362475" />
        </nml:connection>
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      </nml:connections>
    </nml:projection>
    <nml:projection name="mitral_granule_main_exc_singles" source="mitrals" target="granules_singles">
      <nml:synapse_props prop_delay="0.0018" synapse_type="mitral_granule_AMPA" threshold="-0.015" weight="1.0" />
      <nml:synapse_props prop_delay="0.0018" synapse_type="mitral_granule_NMDA" threshold="-0.015" weight="1.0" />
      <nml:connections size="78">
        <nml:connection id="1" post_cell_id="1" post_segment_id="1" pre_cell_id="0" pre_segment_id="168">
          <nml:properties internal_delay="0.0018" synapse_type="mitral_granule_AMPA" weight="1.08726731267" />
          <nml:properties internal_delay="0.0018" synapse_type="mitral_granule_NMDA" weight="0.720990697432" />
        </nml:connection>
        <nml:connection id="3" post_cell_id="3" post_segment_id="1" pre_cell_id="0" pre_segment_id="171">
          <nml:properties internal_delay="0.0018" synapse_type="mitral_granule_AMPA" weight="1.15275147441" />
          <nml:properties internal_delay="0.0018" synapse_type="mitral_granule_NMDA" weight="0.93223260294" />
        </nml:connection>
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      </nml:connections>
    </nml:projection>
    <nml:projection name="mitral_granule_extra_exc_joints" source="mitrals" target="granules_joints">
      <nml:synapse_props prop_delay="0.0018" synapse_type="mitral_granule_AMPA" threshold="-0.015" weight="1.0" />
      <nml:synapse_props prop_delay="0.0018" synapse_type="mitral_granule_NMDA" threshold="-0.015" weight="1.0" />
      <nml:connections size="3180">
        <nml:connection id="0" post_cell_id="0" post_segment_id="1" pre_cell_id="0" pre_segment_id="169">
          <nml:properties internal_delay="0.0018" synapse_type="mitral_granule_AMPA" weight="2.90943852904" />
          <nml:properties internal_delay="0.0018" synapse_type="mitral_granule_NMDA" weight="2.8633940361" />
        </nml:connection>
        <nml:connection id="1" post_cell_id="0" post_segment_id="1" pre_cell_id="3" pre_segment_id="281">
          <nml:properties internal_delay="0.0018" synapse_type="mitral_granule_AMPA" weight="3.84753916875" />
          <nml:properties internal_delay="0.0018" synapse_type="mitral_granule_NMDA" weight="2.43411383197" />
        </nml:connection>
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      </nml:connections>
    </nml:projection>
    <nml:projection name="mitral_granule_main_exc_joints" source="mitrals" target="granules_joints">
      <nml:synapse_props prop_delay="0.0018" synapse_type="mitral_granule_AMPA" threshold="-0.015" weight="1.0" />
      <nml:synapse_props prop_delay="0.0018" synapse_type="mitral_granule_NMDA" threshold="-0.015" weight="1.0" />
      <nml:connections size="1336">
        <nml:connection id="0" post_cell_id="0" post_segment_id="1" pre_cell_id="0" pre_segment_id="169">
          <nml:properties internal_delay="0.0018" synapse_type="mitral_granule_AMPA" weight="2.8907008648" />
          <nml:properties internal_delay="0.0018" synapse_type="mitral_granule_NMDA" weight="3.41028321451" />
        </nml:connection>
        <nml:connection id="1" post_cell_id="0" post_segment_id="1" pre_cell_id="3" pre_segment_id="281">
          <nml:properties internal_delay="0.0018" synapse_type="mitral_granule_AMPA" weight="3.14638229532" />
          <nml:properties internal_delay="0.0018" synapse_type="mitral_granule_NMDA" weight="3.35440083163" />
        </nml:connection>
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      </nml:connections>
    </nml:projection>
    <nml:projection name="mitral_granule_extra_exc_multis" source="mitrals" target="granules_multis">
      <nml:synapse_props prop_delay="0.0018" synapse_type="mitral_granule_AMPA" threshold="-0.015" weight="1.0" />
      <nml:synapse_props prop_delay="0.0018" synapse_type="mitral_granule_NMDA" threshold="-0.015" weight="1.0" />
      <nml:connections size="1065">
        <nml:connection id="0" post_cell_id="0" post_segment_id="1" pre_cell_id="0" pre_segment_id="160">
          <nml:properties internal_delay="0.0018" synapse_type="mitral_granule_AMPA" weight="0.70314778485" />
          <nml:properties internal_delay="0.0018" synapse_type="mitral_granule_NMDA" weight="1.05610218029" />
        </nml:connection>
        <nml:connection id="1" post_cell_id="0" post_segment_id="1" pre_cell_id="0" pre_segment_id="160">
          <nml:properties internal_delay="0.00633043415828" synapse_type="mitral_granule_AMPA" weight="0.969656678356" />
          <nml:properties internal_delay="0.00633043415828" synapse_type="mitral_granule_NMDA" weight="1.01863920122" />
        </nml:connection>
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      </nml:connections>
    </nml:projection>
    <nml:projection name="mitral_granule_main_exc_multis" source="mitrals" target="granules_multis">
      <nml:synapse_props prop_delay="0.0018" synapse_type="mitral_granule_AMPA" threshold="-0.015" weight="1.0" />
      <nml:synapse_props prop_delay="0.0018" synapse_type="mitral_granule_NMDA" threshold="-0.015" weight="1.0" />
      <nml:connections size="263">
        <nml:connection id="0" post_cell_id="0" post_segment_id="1" pre_cell_id="0" pre_segment_id="160">
          <nml:properties internal_delay="0.0018" synapse_type="mitral_granule_AMPA" weight="3.326708516" />
          <nml:properties internal_delay="0.0018" synapse_type="mitral_granule_NMDA" weight="1.58609760272" />
        </nml:connection>
        <nml:connection id="2" post_cell_id="0" post_segment_id="1" pre_cell_id="3" pre_segment_id="256">
          <nml:properties internal_delay="0.0018" synapse_type="mitral_granule_AMPA" weight="0.512720036248" />
          <nml:properties internal_delay="0.0018" synapse_type="mitral_granule_NMDA" weight="0.924327776292" />
        </nml:connection>
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      </nml:connections>
    </nml:projection>
    <nml:projection name="granule_mitral_inh_singles" source="granules_singles" target="mitrals">
      <nml:synapse_props prop_delay="0.0006" synapse_type="granule_mitral_GABA" threshold="-0.015" weight="1.0" />
      <nml:connections size="780">
        <nml:connection id="10" post_cell_id="0" post_segment_id="168" pre_cell_id="1" pre_segment_id="1">
          <nml:properties internal_delay="0.0006" synapse_type="granule_mitral_GABA" weight="0.054921040928" />
        </nml:connection>
        <nml:connection id="11" post_cell_id="0" post_segment_id="168" pre_cell_id="1" pre_segment_id="1">
          <nml:properties internal_delay="0.126311384017" synapse_type="granule_mitral_GABA" weight="0.0485149590144" />
        </nml:connection>
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      </nml:connections>
    </nml:projection>
    <nml:projection name="granule_mitral_inh_joints" source="granules_joints" target="mitrals">
      <nml:synapse_props prop_delay="0.0006" synapse_type="granule_mitral_GABA" threshold="-0.015" weight="1.0" />
      <nml:connections size="1336">
        <nml:connection id="0" post_cell_id="0" post_segment_id="169" pre_cell_id="0" pre_segment_id="1">
          <nml:properties internal_delay="0.0006" synapse_type="granule_mitral_GABA" weight="0.0157545344601" />
        </nml:connection>
        <nml:connection id="1" post_cell_id="3" post_segment_id="281" pre_cell_id="0" pre_segment_id="1">
          <nml:properties internal_delay="0.0006" synapse_type="granule_mitral_GABA" weight="0.00639694150053" />
        </nml:connection>
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      </nml:connections>
    </nml:projection>
    <nml:projection name="granule_mitral_inh_multis" source="granules_multis" target="mitrals">
      <nml:synapse_props prop_delay="0.0006" synapse_type="granule_mitral_GABA" threshold="-0.015" weight="1.0" />
      <nml:connections size="263">
        <nml:connection id="0" post_cell_id="0" post_segment_id="160" pre_cell_id="0" pre_segment_id="1">
          <nml:properties internal_delay="0.0006" synapse_type="granule_mitral_GABA" weight="3.62581419132" />
        </nml:connection>
        <nml:connection id="2" post_cell_id="3" post_segment_id="256" pre_cell_id="0" pre_segment_id="1">
          <nml:properties internal_delay="0.0006" synapse_type="granule_mitral_GABA" weight="1.72383722302" />
        </nml:connection>
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      </nml:connections>
    </nml:projection>
    <nml:projection name="granule_baseline_singles" source="files" target="granules_singles">
      <nml:synapse_props prop_delay="0.0018" synapse_type="mitral_granule_AMPA" threshold="0" weight="1.0" />
      <nml:synapse_props prop_delay="0.0018" synapse_type="mitral_granule_NMDA" threshold="0" weight="1.0" />
      <nml:connections size="78">
        <nml:connection id="1" post_cell_id="1" post_segment_id="1" pre_cell_id="file" pre_segment_id="137" />
        <nml:connection id="3" post_cell_id="3" post_segment_id="1" pre_cell_id="file" pre_segment_id="557" />
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      </nml:connections>
    </nml:projection>
    <nml:projection name="granule_baseline_joints" source="files" target="granules_joints">
      <nml:synapse_props prop_delay="0.0018" synapse_type="mitral_granule_AMPA" threshold="0" weight="1.0" />
      <nml:synapse_props prop_delay="0.0018" synapse_type="mitral_granule_NMDA" threshold="0" weight="1.0" />
      <nml:connections size="668">
        <nml:connection id="0" post_cell_id="0" post_segment_id="1" pre_cell_id="file" pre_segment_id="260" />
        <nml:connection id="1" post_cell_id="1" post_segment_id="1" pre_cell_id="file" pre_segment_id="3" />
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      </nml:connections>
    </nml:projection>
    <nml:projection name="granule_baseline_multis" source="files" target="granules_multis">
      <nml:synapse_props prop_delay="0.0018" synapse_type="mitral_granule_AMPA" threshold="0" weight="1.0" />
      <nml:synapse_props prop_delay="0.0018" synapse_type="mitral_granule_NMDA" threshold="0" weight="1.0" />
      <nml:connections size="87">
        <nml:connection id="0" post_cell_id="0" post_segment_id="1" pre_cell_id="file" pre_segment_id="438" />
        <nml:connection id="1" post_cell_id="1" post_segment_id="1" pre_cell_id="file" pre_segment_id="475" />
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      </nml:connections>
    </nml:projection>
    <nml:projection name="mitral_PG" source="mitrals" target="PGs">
      <nml:synapse_props prop_delay="0.0018" synapse_type="mitral_PG" threshold="-0.015" weight="1.0" />
      <nml:connections size="400">
        <nml:connection id="2" post_cell_id="2" post_segment_id="2" pre_cell_id="0" pre_segment_id="98">
          <nml:properties internal_delay="0.0217189700938" synapse_type="mitral_PG" weight="1.36651995308" />
        </nml:connection>
        <nml:connection id="3" post_cell_id="3" post_segment_id="2" pre_cell_id="0" pre_segment_id="37">
          <nml:properties internal_delay="0.0390126577713" synapse_type="mitral_PG" weight="1.48798318379" />
        </nml:connection>
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      </nml:connections>
    </nml:projection>
    <nml:projection name="PG_mitral" source="PGs" target="mitrals">
      <nml:synapse_props prop_delay="0.0006" synapse_type="PG_mitral" threshold="-0.015" weight="1.0" />
      <nml:connections size="400">
        <nml:connection id="2" post_cell_id="0" post_segment_id="98" pre_cell_id="2" pre_segment_id="2">
          <nml:properties internal_delay="0.15329755929" synapse_type="PG_mitral" weight="0.948124375835" />
        </nml:connection>
        <nml:connection id="3" post_cell_id="0" post_segment_id="37" pre_cell_id="3" pre_segment_id="2">
          <nml:properties internal_delay="0.311615611216" synapse_type="PG_mitral" weight="0.851444627819" />
        </nml:connection>
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      </nml:connections>
    </nml:projection>
    <nml:projection name="ORN_mitral" source="file" target="mitrals">
      <nml:synapse_props prop_delay="0.0" synapse_type="ORN_mitral" threshold="0" weight="1" />
      <nml:connections size="372">
        <nml:connection id="0" post_cell_id="0" post_segment_id="24" pre_cell_id="file" pre_segment_id="106_624_345" />
        <nml:connection id="1" post_cell_id="0" post_segment_id="25" pre_cell_id="file" pre_segment_id="898_843_1" />
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      </nml:connections>
    </nml:projection>
    <nml:projection name="ORN_PG" source="file" target="PGs">
      <nml:synapse_props prop_delay="0.0" synapse_type="ORN_PG" threshold="0" weight="1" />
      <nml:connections size="736">
        <nml:connection id="100" post_cell_id="2" post_segment_id="1" pre_cell_id="file" pre_segment_id="71_840_544_224_504_286_628_179_618_784_482_428_185_658_353_332_158_379_201_307_299_375_263_569" />
        <nml:connection id="101" post_cell_id="2" post_segment_id="2" pre_cell_id="file" pre_segment_id="442_438_664_67_109_604_224_455_919_335_657_464_937_98_554_753_792_663_777_204_471_865_640_851_459_234" />
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      </nml:connections>
    </nml:projection>
  </nml:projections>
</neuroml:neuroml>
