<?xml version="1.0" ?>
<neuroml lengthUnits="micrometer" xmlns="http://morphml.org/neuroml/schema" xmlns:bio="http://morphml.org/biophysics/schema" xmlns:cml="http://morphml.org/channelml/schema" xmlns:meta="http://morphml.org/metadata/schema" xmlns:mml="http://morphml.org/morphml/schema" xmlns:nml="http://morphml.org/networkml/schema" xmlns:xsi="http://www.w3.org/2001/XMLSchema-instance" xsi:schemaLocation="http://morphml.org/neuroml/schema">
	<meta:notes>
		Fully instantiated network model of Olfactory Bulb by Aditya Gilra, NCBS, Bangalore, India, 2010.
	</meta:notes>
	<populations xmlns="http://morphml.org/networkml/schema">
		<population cell_type="mitral" name="mitrals">
			<instances size="4">
				<instance id="0">
					<location x="0.0" y="0.0" z="300.0"/>
					<meta:notes>
						zrotation=0.915266923378
					</meta:notes>
				</instance>
				<instance id="1">
					<location x="-4.5072995486" y="27.0783805659" z="300.0"/>
					<meta:notes>
						zrotation=4.43287034149
					</meta:notes>
				</instance>
				<instance id="2">
					<location x="50.0" y="0.0" z="300.0"/>
					<meta:notes>
						zrotation=2.85364938569
					</meta:notes>
				</instance>
				<instance id="3">
					<location x="54.3937262474" y="-1.36000396892" z="300.0"/>
					<meta:notes>
						zrotation=4.41914800411
					</meta:notes>
				</instance>
			</instances>
		</population>
		<population cell_type="granule" name="granules_singles">
			<instances size="78">
				<instance id="0">
					<location x="-604.0" y="-62.0" z="0.0"/>
				</instance>
				<instance id="1">
					<location x="-574.0" y="64.0" z="0.0"/>
				</instance>
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			</instances>
		</population>
		<population cell_type="granule" name="granules_joints">
			<instances size="668">
				<instance id="0">
					<location x="-704.0" y="-98.0" z="0.0"/>
				</instance>
				<instance id="1">
					<location x="-644.0" y="-78.0" z="0.0"/>
				</instance>
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			</instances>
		</population>
		<population cell_type="granule" name="granules_multis">
			<instances size="87">
				<instance id="0">
					<location x="-48.0" y="26.0" z="0.0"/>
				</instance>
				<instance id="1">
					<location x="-40.0" y="0.0" z="0.0"/>
				</instance>
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			</instances>
		</population>
		<population cell_type="PG" name="PGs">
			<instances size="368">
				<instance id="0">
					<location x="-100.0" y="-87.3508893593" z="1050.0"/>
				</instance>
				<instance id="1">
					<location x="-100.0" y="-43.079002117" z="1050.0"/>
				</instance>
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			</instances>
		</population>
	</populations>
	<projections units="SI Units" xmlns="http://morphml.org/networkml/schema">
		<projection name="mitral_granule_extra_exc_singles" source="mitrals" target="granules_singles">
			<synapse_props prop_delay="0.0018" synapse_type="mitral_granule_AMPA" threshold="-0.015" weight="1.0"/>
			<synapse_props prop_delay="0.0018" synapse_type="mitral_granule_NMDA" threshold="-0.015" weight="1.0"/>
			<connections size="79">
				<connection id="0" post_cell_id="15" post_segment_id="1" pre_cell_id="1" pre_segment_id="257">
					<properties internal_delay="0.0018" synapse_type="mitral_granule_AMPA" weight="0.807890242617"/>
					<properties internal_delay="0.0018" synapse_type="mitral_granule_NMDA" weight="1.29122990489"/>
				</connection>
				<connection id="1" post_cell_id="16" post_segment_id="1" pre_cell_id="2" pre_segment_id="153">
					<properties internal_delay="0.0018" synapse_type="mitral_granule_AMPA" weight="1.2653508647"/>
					<properties internal_delay="0.0018" synapse_type="mitral_granule_NMDA" weight="0.647248751637"/>
				</connection>
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			</connections>
		</projection>
		<projection name="mitral_granule_main_exc_singles" source="mitrals" target="granules_singles">
			<synapse_props prop_delay="0.0018" synapse_type="mitral_granule_AMPA" threshold="-0.015" weight="1.0"/>
			<synapse_props prop_delay="0.0018" synapse_type="mitral_granule_NMDA" threshold="-0.015" weight="1.0"/>
			<connections size="78">
				<connection id="0" post_cell_id="0" post_segment_id="1" pre_cell_id="1" pre_segment_id="279">
					<properties internal_delay="0.0018" synapse_type="mitral_granule_AMPA" weight="0.94355027886"/>
					<properties internal_delay="0.0018" synapse_type="mitral_granule_NMDA" weight="1.03089336205"/>
				</connection>
				<connection id="1" post_cell_id="1" post_segment_id="1" pre_cell_id="0" pre_segment_id="168">
					<properties internal_delay="0.0018" synapse_type="mitral_granule_AMPA" weight="1.08726731267"/>
					<properties internal_delay="0.0018" synapse_type="mitral_granule_NMDA" weight="0.720990697432"/>
				</connection>
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			</connections>
		</projection>
		<projection name="mitral_granule_extra_exc_joints" source="mitrals" target="granules_joints">
			<synapse_props prop_delay="0.0018" synapse_type="mitral_granule_AMPA" threshold="-0.015" weight="1.0"/>
			<synapse_props prop_delay="0.0018" synapse_type="mitral_granule_NMDA" threshold="-0.015" weight="1.0"/>
			<connections size="3180">
				<connection id="0" post_cell_id="0" post_segment_id="1" pre_cell_id="0" pre_segment_id="169">
					<properties internal_delay="0.0018" synapse_type="mitral_granule_AMPA" weight="2.90943852904"/>
					<properties internal_delay="0.0018" synapse_type="mitral_granule_NMDA" weight="2.8633940361"/>
				</connection>
				<connection id="1" post_cell_id="0" post_segment_id="1" pre_cell_id="3" pre_segment_id="281">
					<properties internal_delay="0.0018" synapse_type="mitral_granule_AMPA" weight="3.84753916875"/>
					<properties internal_delay="0.0018" synapse_type="mitral_granule_NMDA" weight="2.43411383197"/>
				</connection>
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			</connections>
		</projection>
		<projection name="mitral_granule_main_exc_joints" source="mitrals" target="granules_joints">
			<synapse_props prop_delay="0.0018" synapse_type="mitral_granule_AMPA" threshold="-0.015" weight="1.0"/>
			<synapse_props prop_delay="0.0018" synapse_type="mitral_granule_NMDA" threshold="-0.015" weight="1.0"/>
			<connections size="1336">
				<connection id="0" post_cell_id="0" post_segment_id="1" pre_cell_id="0" pre_segment_id="169">
					<properties internal_delay="0.0018" synapse_type="mitral_granule_AMPA" weight="2.8907008648"/>
					<properties internal_delay="0.0018" synapse_type="mitral_granule_NMDA" weight="3.41028321451"/>
				</connection>
				<connection id="1" post_cell_id="0" post_segment_id="1" pre_cell_id="3" pre_segment_id="281">
					<properties internal_delay="0.0018" synapse_type="mitral_granule_AMPA" weight="3.14638229532"/>
					<properties internal_delay="0.0018" synapse_type="mitral_granule_NMDA" weight="3.35440083163"/>
				</connection>
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			</connections>
		</projection>
		<projection name="mitral_granule_extra_exc_multis" source="mitrals" target="granules_multis">
			<synapse_props prop_delay="0.0018" synapse_type="mitral_granule_AMPA" threshold="-0.015" weight="1.0"/>
			<synapse_props prop_delay="0.0018" synapse_type="mitral_granule_NMDA" threshold="-0.015" weight="1.0"/>
			<connections size="1065">
				<connection id="0" post_cell_id="0" post_segment_id="1" pre_cell_id="0" pre_segment_id="160">
					<properties internal_delay="0.0018" synapse_type="mitral_granule_AMPA" weight="0.70314778485"/>
					<properties internal_delay="0.0018" synapse_type="mitral_granule_NMDA" weight="1.05610218029"/>
				</connection>
				<connection id="1" post_cell_id="0" post_segment_id="1" pre_cell_id="0" pre_segment_id="160">
					<properties internal_delay="0.00633043415828" synapse_type="mitral_granule_AMPA" weight="0.969656678356"/>
					<properties internal_delay="0.00633043415828" synapse_type="mitral_granule_NMDA" weight="1.01863920122"/>
				</connection>
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			</connections>
		</projection>
		<projection name="mitral_granule_main_exc_multis" source="mitrals" target="granules_multis">
			<synapse_props prop_delay="0.0018" synapse_type="mitral_granule_AMPA" threshold="-0.015" weight="1.0"/>
			<synapse_props prop_delay="0.0018" synapse_type="mitral_granule_NMDA" threshold="-0.015" weight="1.0"/>
			<connections size="263">
				<connection id="0" post_cell_id="0" post_segment_id="1" pre_cell_id="0" pre_segment_id="160">
					<properties internal_delay="0.0018" synapse_type="mitral_granule_AMPA" weight="3.326708516"/>
					<properties internal_delay="0.0018" synapse_type="mitral_granule_NMDA" weight="1.58609760272"/>
				</connection>
				<connection id="1" post_cell_id="0" post_segment_id="1" pre_cell_id="1" pre_segment_id="17">
					<properties internal_delay="0.0018" synapse_type="mitral_granule_AMPA" weight="1.05708940137"/>
					<properties internal_delay="0.0018" synapse_type="mitral_granule_NMDA" weight="1.14600725802"/>
				</connection>
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			</connections>
		</projection>
		<projection name="granule_mitral_inh_singles" source="granules_singles" target="mitrals">
			<synapse_props prop_delay="0.0006" synapse_type="granule_mitral_GABA" threshold="-0.015" weight="1.0"/>
			<connections size="780">
				<connection id="0" post_cell_id="1" post_segment_id="279" pre_cell_id="0" pre_segment_id="1">
					<properties internal_delay="0.0006" synapse_type="granule_mitral_GABA" weight="0.0409281103761"/>
				</connection>
				<connection id="1" post_cell_id="1" post_segment_id="279" pre_cell_id="0" pre_segment_id="1">
					<properties internal_delay="0.0217820503885" synapse_type="granule_mitral_GABA" weight="0.0455539794605"/>
				</connection>
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			</connections>
		</projection>
		<projection name="granule_mitral_inh_spinesingles" source="mitrals" target="mitrals">
			<synapse_props prop_delay="0.0006" synapse_type="mitral_self_GABA" threshold="-0.015" weight="1.0"/>
			<connections size="780">
				<connection id="0" post_cell_id="1" post_segment_id="279" pre_cell_id="1" pre_segment_id="279">
					<properties internal_delay="0.0006" synapse_type="mitral_self_GABA" weight="0.0429946549339"/>
				</connection>
				<connection id="1" post_cell_id="1" post_segment_id="279" pre_cell_id="1" pre_segment_id="279">
					<properties internal_delay="0.0557232481289" synapse_type="mitral_self_GABA" weight="0.0396688331947"/>
				</connection>
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			</connections>
		</projection>
		<projection name="granule_mitral_inh_joints" source="granules_joints" target="mitrals">
			<synapse_props prop_delay="0.0006" synapse_type="granule_mitral_GABA" threshold="-0.015" weight="1.0"/>
			<connections size="1336">
				<connection id="0" post_cell_id="0" post_segment_id="169" pre_cell_id="0" pre_segment_id="1">
					<properties internal_delay="0.0006" synapse_type="granule_mitral_GABA" weight="0.0157545344601"/>
				</connection>
				<connection id="1" post_cell_id="3" post_segment_id="281" pre_cell_id="0" pre_segment_id="1">
					<properties internal_delay="0.0006" synapse_type="granule_mitral_GABA" weight="0.00639694150053"/>
				</connection>
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			</connections>
		</projection>
		<projection name="granule_mitral_inh_spinejoints" source="mitrals" target="mitrals">
			<synapse_props prop_delay="0.0006" synapse_type="mitral_self_GABA" threshold="-0.015" weight="1.0"/>
			<connections size="1336">
				<connection id="0" post_cell_id="0" post_segment_id="169" pre_cell_id="0" pre_segment_id="169">
					<properties internal_delay="0.0006" synapse_type="mitral_self_GABA" weight="0.012345679316"/>
				</connection>
				<connection id="1" post_cell_id="3" post_segment_id="281" pre_cell_id="3" pre_segment_id="281">
					<properties internal_delay="0.0006" synapse_type="mitral_self_GABA" weight="0.00427738764788"/>
				</connection>
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			</connections>
		</projection>
		<projection name="granule_mitral_inh_multis" source="granules_multis" target="mitrals">
			<synapse_props prop_delay="0.0006" synapse_type="granule_mitral_GABA" threshold="-0.015" weight="1.0"/>
			<connections size="263">
				<connection id="0" post_cell_id="0" post_segment_id="160" pre_cell_id="0" pre_segment_id="1">
					<properties internal_delay="0.0006" synapse_type="granule_mitral_GABA" weight="3.62581419132"/>
				</connection>
				<connection id="1" post_cell_id="1" post_segment_id="17" pre_cell_id="0" pre_segment_id="1">
					<properties internal_delay="0.0006" synapse_type="granule_mitral_GABA" weight="0.167019675803"/>
				</connection>
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			</connections>
		</projection>
		<projection name="granule_mitral_inh_spinemultis" source="mitrals" target="mitrals">
			<synapse_props prop_delay="0.0006" synapse_type="mitral_self_GABA" threshold="-0.015" weight="1.0"/>
			<connections size="263">
				<connection id="0" post_cell_id="0" post_segment_id="160" pre_cell_id="0" pre_segment_id="160">
					<properties internal_delay="0.0006" synapse_type="mitral_self_GABA" weight="6.28662267146"/>
				</connection>
				<connection id="1" post_cell_id="1" post_segment_id="17" pre_cell_id="1" pre_segment_id="17">
					<properties internal_delay="0.0006" synapse_type="mitral_self_GABA" weight="0.105520566036"/>
				</connection>
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			</connections>
		</projection>
		<projection name="granule_baseline_singles" source="files" target="granules_singles">
			<synapse_props prop_delay="0.0018" synapse_type="mitral_granule_AMPA" threshold="0" weight="1.0"/>
			<synapse_props prop_delay="0.0018" synapse_type="mitral_granule_NMDA" threshold="0" weight="1.0"/>
			<connections size="78">
				<connection id="0" post_cell_id="0" post_segment_id="1" pre_cell_id="file" pre_segment_id="88"/>
				<connection id="1" post_cell_id="1" post_segment_id="1" pre_cell_id="file" pre_segment_id="137"/>
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			</connections>
		</projection>
		<projection name="granule_baseline_joints" source="files" target="granules_joints">
			<synapse_props prop_delay="0.0018" synapse_type="mitral_granule_AMPA" threshold="0" weight="1.0"/>
			<synapse_props prop_delay="0.0018" synapse_type="mitral_granule_NMDA" threshold="0" weight="1.0"/>
			<connections size="668">
				<connection id="0" post_cell_id="0" post_segment_id="1" pre_cell_id="file" pre_segment_id="260"/>
				<connection id="1" post_cell_id="1" post_segment_id="1" pre_cell_id="file" pre_segment_id="3"/>
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			</connections>
		</projection>
		<projection name="granule_baseline_multis" source="files" target="granules_multis">
			<synapse_props prop_delay="0.0018" synapse_type="mitral_granule_AMPA" threshold="0" weight="1.0"/>
			<synapse_props prop_delay="0.0018" synapse_type="mitral_granule_NMDA" threshold="0" weight="1.0"/>
			<connections size="87">
				<connection id="0" post_cell_id="0" post_segment_id="1" pre_cell_id="file" pre_segment_id="438"/>
				<connection id="1" post_cell_id="1" post_segment_id="1" pre_cell_id="file" pre_segment_id="475"/>
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			</connections>
		</projection>
		<projection name="mitral_PG" source="mitrals" target="PGs">
			<synapse_props prop_delay="0.0018" synapse_type="mitral_PG" threshold="-0.015" weight="1.0"/>
			<connections size="400">
				<connection id="0" post_cell_id="0" post_segment_id="1" pre_cell_id="1" pre_segment_id="107">
					<properties internal_delay="0.0392184021516" synapse_type="mitral_PG" weight="0.83547270474"/>
				</connection>
				<connection id="1" post_cell_id="1" post_segment_id="1" pre_cell_id="1" pre_segment_id="111">
					<properties internal_delay="0.00128660406548" synapse_type="mitral_PG" weight="1.20978786448"/>
				</connection>
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			</connections>
		</projection>
		<projection name="PG_mitral" source="PGs" target="mitrals">
			<synapse_props prop_delay="0.0006" synapse_type="PG_mitral" threshold="-0.015" weight="1.0"/>
			<connections size="400">
				<connection id="0" post_cell_id="1" post_segment_id="107" pre_cell_id="0" pre_segment_id="1">
					<properties internal_delay="0.0815697988963" synapse_type="PG_mitral" weight="0.859356507667"/>
				</connection>
				<connection id="1" post_cell_id="1" post_segment_id="111" pre_cell_id="1" pre_segment_id="1">
					<properties internal_delay="0.0111039082634" synapse_type="PG_mitral" weight="0.807437968616"/>
				</connection>
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			</connections>
		</projection>
		<projection name="ORN_mitral" source="file" target="mitrals">
			<synapse_props prop_delay="0.0" synapse_type="ORN_mitral" threshold="0" weight="1"/>
			<connections size="372">
				<connection id="0" post_cell_id="0" post_segment_id="24" pre_cell_id="file" pre_segment_id="106_624_345"/>
				<connection id="1" post_cell_id="0" post_segment_id="25" pre_cell_id="file" pre_segment_id="898_843_1"/>
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			</connections>
		</projection>
		<projection name="ORN_PG" source="file" target="PGs">
			<synapse_props prop_delay="0.0" synapse_type="ORN_PG" threshold="0" weight="1"/>
			<connections size="736">
				<connection id="0" post_cell_id="0" post_segment_id="1" pre_cell_id="file" pre_segment_id="805_168_876_275_337_683_827_437_805_246_957_332_216_338_515_334_883_474_798_395_253_250_943_979_56_68_441_374_332_828"/>
				<connection id="1" post_cell_id="0" post_segment_id="2" pre_cell_id="file" pre_segment_id="97_152_971_518_630_452_13_695_416_403_621_24_126_810_727_63_678_966_68_20"/>
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			</connections>
		</projection>
		<projection name="SA_PG" source="file" target="PGs">
			<synapse_props prop_delay="0.0" synapse_type="SA_PG" threshold="0" weight="1"/>
			<connections size="736">
				<connection id="0" post_cell_id="0" post_segment_id="1" pre_cell_id="file" pre_segment_id="233_807_254_996_353_402_263_878_38_828_824_220_862"/>
				<connection id="1" post_cell_id="0" post_segment_id="2" pre_cell_id="file" pre_segment_id="511_939_400_817_392_814_268_325_755_29_873_242"/>
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			</connections>
		</projection>
	</projections>
</neuroml>
