<?xml version="1.0" encoding="UTF-8"?>
<neuroml xmlns="http://morphml.org/neuroml/schema"
    xmlns:mml="http://morphml.org/morphml/schema"
    xmlns:nml="http://morphml.org/networkml/schema"
    xmlns:meta="http://morphml.org/metadata/schema"
    xmlns:bio="http://morphml.org/biophysics/schema"
    xmlns:cml="http://morphml.org/channelml/schema"
    xmlns:xsi="http://www.w3.org/2001/XMLSchema-instance"
    xsi:schemaLocation="http://morphml.org/neuroml/schema http://www.neuroml.org/NeuroMLValidator/NeuroMLFiles/Schemata/v1.8.0/Level3/NeuroML_Level3_v1.8.0.xsd"
    name = "NeuroML Level 2 file exported from NEURON, added Level 3 by Aditya"
    lengthUnits="micron">

<meta:notes>NeuroML Level 2 file generated from ModelView by: NEURON -- Release 7.1 (359:7f113b76a94b) 2009-10-26
Authors: Michael Hines, Sushil Kambampati and Padraig Gleeson, Yale University and UCL.
Aditya Gilra added Level 3 connectivity information.
Aditya Gilra changed Rm for smaller time constant and increased Na in prim dend for bAP. </meta:notes>

<cells>
  <cell name="mitral">
    <meta:notes>Cell: soma exported from NEURON ModelView</meta:notes>
    <segments  xmlns="http://morphml.org/morphml/schema"> <!-- Changing the namespace from neuroml to morphml-->
<!-- Section: soma -->
      <segment id="0" name = "Seg0_soma" cable = "0">
        <proximal x="0" y="0" z="0" diameter="32"/>
        <distal x="32" y="0" z="0" diameter="32"/>
      </segment>
<!-- Section: sec_dendp4[0] -->
      <segment id="254" name = "Seg0_sec_dendp4_0" parent="0" cable = "253">  <!-- Connected at 0 on parent section: soma  -->
        <proximal x="0" y="0" z="0" diameter="5.8"/>
        <distal x="0" y="-25.9808" z="15" diameter="5.8"/>
      </segment>
<!-- Section: sec_dendp3[0] -->
      <segment id="201" name = "Seg0_sec_dendp3_0" parent="0" cable = "200">  <!-- Connected at 0 on parent section: soma  -->
        <proximal x="0" y="0" z="0" diameter="5.8"/>
        <distal x="-25.9808" y="3.18173e-15" z="15" diameter="5.8"/>
      </segment>
<!-- Section: sec_dendp2[0] -->
      <segment id="158" name = "Seg0_sec_dendp2_0" parent="0" cable = "157">  <!-- Connected at 0 on parent section: soma  -->
        <proximal x="0" y="0" z="0" diameter="5.8"/>
        <distal x="0" y="25.9808" z="15" diameter="5.8"/>
      </segment>
<!-- Section: sec_dendp1[0] -->
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    </segments>
    <cables  xmlns="http://morphml.org/morphml/schema"> <!-- Changing namespace from neuroml to morphml-->
      <cable id = "0" name = "soma" fract_along_parent = "0"/>
      <cable id = "253" name = "sec_dendp4_0" fract_along_parent = "0"/>
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      <cablegroup name="ModelViewParmSubset_0">
        <cable id = "0"/>
        <cable id = "253"/>
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      </cablegroup>
      <cablegroup name="ModelViewParmSubset_1">
        <cable id = "0"/>
        <cable id = "253"/>
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      </cablegroup>
      <cablegroup name="ModelViewParmSubset_2">
        <cable id = "0"/>
        <cable id = "253"/>
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      </cablegroup>
      <cablegroup name="ModelViewParmSubset_3">
        <cable id = "0"/>
        <cable id = "1"/>
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      </cablegroup>
      <cablegroup name="ModelViewParmSubset_4">
        <cable id = "253"/>
        <cable id = "200"/>
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      </cablegroup>
      <cablegroup name="ModelViewParmSubset_5">
        <cable id = "110"/>
        <cable id = "109"/>
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      </cablegroup>
      <cablegroup name="ModelViewParmSubset_6">
        <cable id = "113"/>
        <cable id = "100"/>
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      </cablegroup>
      <cablegroup name="ModelViewParmSubset_7">
        <cable id = "111"/>
        <cable id = "106"/>
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      </cablegroup>
      <cablegroup name="ModelViewParmSubset_8">
        <cable id = "105"/>
        <cable id = "104"/>
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      </cablegroup>
      <cablegroup name="ModelViewParmSubset_9">
        <cable id = "103"/>
        <cable id = "94"/>
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      </cablegroup>
      <cablegroup name="ModelViewParmSubset_10">
        <cable id = "285"/>
        <cable id = "252"/>
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      </cablegroup>
      <cablegroup name="ModelViewParmSubset_11">
        <cable id = "284"/>
        <cable id = "251"/>
        <cable id = "198"/>
        <cable id = "155"/>
      </cablegroup>
      <cablegroup name="ModelViewParmSubset_12">
        <cable id = "283"/>
        <cable id = "250"/>
        <cable id = "197"/>
        <cable id = "154"/>
      </cablegroup>
      <cablegroup name="ModelViewParmSubset_13">
        <cable id = "5"/>
        <cable id = "101"/>
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      </cablegroup>
      <cablegroup name="ModelViewParmSubset_14">
        <cable id = "282"/>
        <cable id = "249"/>
        <cable id = "196"/>
        <cable id = "153"/>
      </cablegroup>
      <cablegroup name="ModelViewParmSubset_15">
        <cable id = "281"/>
        <cable id = "248"/>
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      </cablegroup>
      <cablegroup name="ModelViewParmSubset_16">
        <cable id = "91"/>
        <cable id = "68"/>
        <cable id = "44"/>
        <cable id = "21"/>
      </cablegroup>
      <cablegroup name="ModelViewParmSubset_17">
        <cable id = "257"/>
        <cable id = "204"/>
        <cable id = "161"/>
        <cable id = "118"/>
      </cablegroup>
      <cablegroup name="ModelViewParmSubset_18">
        <cable id = "256"/>
        <cable id = "203"/>
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      </cablegroup>
      <cablegroup name="ModelViewParmSubset_19">
        <cable id = "117"/>
        <cable id = "121"/>
      </cablegroup>
      <cablegroup name="ModelViewParmSubset_20">
        <cable id = "67"/>
        <cable id = "20"/>
      </cablegroup>
      <cablegroup name="ModelViewParmSubset_21">
        <cable id = "254"/>
        <cable id = "201"/>
        <cable id = "158"/>
        <cable id = "115"/>
      </cablegroup>
      <cablegroup name="ModelViewParmSubset_22">
        <cable id = "253"/>
        <cable id = "200"/>
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      </cablegroup>
      <cablegroup name="ModelViewParmSubset_23">
        <cable id = "1"/>
        <cable id = "2"/>
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      </cablegroup>
      <!-- primary dendrite compartments 0 to 5 -->
      <cablegroup name="ModelViewParmSubset_24">
        <cable id = "14"/>
        <cable id = "15"/>
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      </cablegroup>
      <cablegroup name="ModelViewParmSubset_25">
        <cable id = "11"/>
        <cable id = "12"/>
        <cable id = "13"/>
      </cablegroup>
      <cablegroup name="ModelViewParmSubset_26">
        <cable id = "276"/>
        <cable id = "261"/>
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      </cablegroup>
      <cablegroup name="ModelViewParmSubset_27">
        <cable id = "253"/>
        <cable id = "200"/>
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      </cablegroup>
      <cablegroup name="ModelViewParmSubset_28">
        <cable id = "6"/>
        <cable id = "7"/>
        <cable id = "8"/>
        <cable id = "9"/>
      </cablegroup>
      <cablegroup name="ModelViewParmSubset_29">
        <cable id = "3"/>
        <cable id = "4"/>
        <cable id = "5"/>
      </cablegroup>
      <cablegroup name="ModelViewParmSubset_30">
        <cable id = "1"/>
        <cable id = "2"/>
      </cablegroup>
      <cablegroup name="ModelViewParmSubset_31">
        <cable id = "0"/>
        <cable id = "67"/>
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      </cablegroup>
      <cablegroup name="ModelViewParmSubset_32">
        <cable id = "67"/>
        <cable id = "20"/>
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      </cablegroup>
      <cablegroup name="ModelViewParmSubset_33">
        <cable id = "12"/>
        <cable id = "13"/>
      </cablegroup>
      <cablegroup name="ModelViewParmSubset_34">
        <cable id = "6"/>
        <cable id = "7"/>
      </cablegroup>
      <cablegroup name="OneSecGrp_SectionRef_1"> <!-- Creating a group containing a single section: soma... -->
        <cable id = "0"/>
      </cablegroup>
      <cablegroup name="OneSecGrp_SectionRef_29"> <!-- Creating a group containing a single section: axon[3]... -->
        <cable id = "4"/>
      </cablegroup>
      <cablegroup name="OneSecGrp_SectionRef_48"> <!-- Creating a group containing a single section: prim_dend[5]... -->
        <cable id = "19"/>
      </cablegroup>
      <cablegroup name="OneSecGrp_SectionRef_19"> <!-- Creating a group containing a single section: axon[2]... -->
        <cable id = "3"/>
      </cablegroup>
      <cablegroup name="OneSecGrp_SectionRef_38"> <!-- Creating a group containing a single section: prim_dend[4]... -->
        <cable id = "18"/>
      </cablegroup>
      <cablegroup name="OneSecGrp_SectionRef_28"> <!-- Creating a group containing a single section: prim_dend[3]... -->
        <cable id = "17"/>
      </cablegroup>
      <cablegroup name="OneSecGrp_SectionRef_18"> <!-- Creating a group containing a single section: prim_dend[2]... -->
        <cable id = "16"/>
      </cablegroup>
      <cablegroup name="OneSecGrp_SectionRef_13"> <!-- Creating a group containing a single section: axon[1]... -->
        <cable id = "2"/>
      </cablegroup>
      <cablegroup name="OneSecGrp_SectionRef_12"> <!-- Creating a group containing a single section: prim_dend[1]... -->
        <cable id = "15"/>
      </cablegroup>
      <cablegroup name="OneSecGrp_SectionRef_6"> <!-- Creating a group containing a single section: prim_dend[0]... -->
        <cable id = "14"/>
      </cablegroup>
      <cablegroup name="OneSecGrp_SectionRef_7"> <!-- Creating a group containing a single section: axon[0]... -->
        <cable id = "1"/>
      </cablegroup>
      <cablegroup name="OneSecGrp_SectionRef_115"> <!-- Creating a group containing a single section: axon[9]... -->
        <cable id = "10"/>
      </cablegroup>
      <cablegroup name="OneSecGrp_SectionRef_140"> <!-- Creating a group containing a single section: axon[10]... -->
        <cable id = "11"/>
      </cablegroup>
      <cablegroup name="OneSecGrp_SectionRef_90"> <!-- Creating a group containing a single section: axon[8]... -->
        <cable id = "9"/>
      </cablegroup>
      <cablegroup name="OneSecGrp_SectionRef_73"> <!-- Creating a group containing a single section: axon[7]... -->
        <cable id = "8"/>
      </cablegroup>
    </cables>
    <biophysics  units = "Physiological Units"> <!-- Note: values of cond dens are different in NEURON and phy units-->
      <bio:mechanism name="pas" type="Channel Mechanism" passive_conductance="true">
        <!-- Aditya set this to 2 Ohm.m^2 instead of 10 Ohm.m^2 to get smaller membrane time constant -->
        <bio:parameter name="gmax" value="0.05"> <!-- mS/cm^2 -->
          <bio:group>ModelViewParmSubset_4</bio:group>
        </bio:parameter>
        <!--<bio:parameter name="gmax" value="0.259041">-->
        <!--This is with the electrode leak in the soma (OneSecGrp_SectionRef_1 is soma cablegroup),
         Aditya removes it below:-->
        <!-- Aditya set this to 2 Ohm.m^2 instead of 10 Ohm.m^2 to get smaller membrane time constant -->
        <bio:parameter name="gmax" value="0.05"> <!-- mS/cm^2 -->
          <bio:group>OneSecGrp_SectionRef_1</bio:group>
        </bio:parameter>
        <bio:parameter name="e" value="-58">
          <bio:group>all</bio:group>
        </bio:parameter>
      </bio:mechanism>
      <bio:mechanism name="Ca_mit_conc" type="Ion Concentration">
        <bio:parameter name="depth" value="0.125">
          <bio:group>ModelViewParmSubset_5</bio:group>
        </bio:parameter>
        <bio:parameter name="depth" value="0.175">
          <bio:group>ModelViewParmSubset_6</bio:group>
        </bio:parameter>
        <bio:parameter name="depth" value="0.2">
          <bio:group>ModelViewParmSubset_7</bio:group>
        </bio:parameter>
        <bio:parameter name="depth" value="0.225">
          <bio:group>ModelViewParmSubset_8</bio:group>
        </bio:parameter>
        <bio:parameter name="depth" value="0.25">
          <bio:group>ModelViewParmSubset_9</bio:group>
        </bio:parameter>
        <bio:parameter name="depth" value="0.375">
          <bio:group>ModelViewParmSubset_10</bio:group>
        </bio:parameter>
        <bio:parameter name="depth" value="0.4">
          <bio:group>ModelViewParmSubset_11</bio:group>
        </bio:parameter>
        <bio:parameter name="depth" value="0.45">
          <bio:group>ModelViewParmSubset_12</bio:group>
        </bio:parameter>
        <bio:parameter name="depth" value="0.5">
          <bio:group>ModelViewParmSubset_13</bio:group>
        </bio:parameter>
        <bio:parameter name="depth" value="0.55">
          <bio:group>ModelViewParmSubset_14</bio:group>
        </bio:parameter>
        <bio:parameter name="depth" value="0.675">
          <bio:group>ModelViewParmSubset_15</bio:group>
        </bio:parameter>
        <bio:parameter name="depth" value="0.7">
          <bio:group>ModelViewParmSubset_16</bio:group>
        </bio:parameter>
        <bio:parameter name="depth" value="0.725">
          <bio:group>ModelViewParmSubset_17</bio:group>
        </bio:parameter>
        <bio:parameter name="depth" value="0.75">
          <bio:group>OneSecGrp_SectionRef_29</bio:group>
        </bio:parameter>
        <bio:parameter name="depth" value="0.775">
          <bio:group>ModelViewParmSubset_18</bio:group>
        </bio:parameter>
        <bio:parameter name="depth" value="0.8">
          <bio:group>ModelViewParmSubset_19</bio:group>
        </bio:parameter>
        <bio:parameter name="depth" value="0.875">
          <bio:group>ModelViewParmSubset_20</bio:group>
        </bio:parameter>
        <bio:parameter name="depth" value="1.175">
          <bio:group>OneSecGrp_SectionRef_48</bio:group>
        </bio:parameter>
        <bio:parameter name="depth" value="1.25">
          <bio:group>OneSecGrp_SectionRef_19</bio:group>
        </bio:parameter>
        <bio:parameter name="depth" value="1.325">
          <bio:group>OneSecGrp_SectionRef_38</bio:group>
        </bio:parameter>
        <bio:parameter name="depth" value="1.4">
          <bio:group>ModelViewParmSubset_21</bio:group>
        </bio:parameter>
        <bio:parameter name="depth" value="1.45">
          <bio:group>ModelViewParmSubset_22</bio:group>
        </bio:parameter>
        <bio:parameter name="depth" value="1.5">
          <bio:group>OneSecGrp_SectionRef_28</bio:group>
        </bio:parameter>
        <bio:parameter name="depth" value="1.65">
          <bio:group>OneSecGrp_SectionRef_18</bio:group>
        </bio:parameter>
        <bio:parameter name="depth" value="1.75">
          <bio:group>OneSecGrp_SectionRef_13</bio:group>
        </bio:parameter>
        <bio:parameter name="depth" value="1.825">
          <bio:group>OneSecGrp_SectionRef_12</bio:group>
        </bio:parameter>
        <bio:parameter name="depth" value="1.975">
          <bio:group>OneSecGrp_SectionRef_6</bio:group>
        </bio:parameter>
        <bio:parameter name="depth" value="2.5">
          <bio:group>OneSecGrp_SectionRef_7</bio:group>
        </bio:parameter>
        <bio:parameter name="depth" value="8">
          <bio:group>OneSecGrp_SectionRef_1</bio:group>
        </bio:parameter>
        <bio:parameter name="ica" value="0">
          <bio:group>ModelViewParmSubset_2</bio:group>
        </bio:parameter>
      </bio:mechanism>
      <bio:mechanism name="KA_bsg_yka" type="Channel Mechanism">
        <!-- axon[0] to axon[4] -->
        <bio:parameter name="gmax" value="5.15">
          <bio:group>ModelViewParmSubset_23</bio:group>
        </bio:parameter>
        <!-- soma -->
        <bio:parameter name="gmax" value="5.87">
          <bio:group>OneSecGrp_SectionRef_1</bio:group>
        </bio:parameter>
      </bio:mechanism>
      <bio:mechanism name="Kca_mit_usb" type="Channel Mechanism">
        <!-- axon[0] to axon[4] -->
        <bio:parameter name="gmax" value="8.87">
          <bio:group>ModelViewParmSubset_23</bio:group>
        </bio:parameter>
        <!-- soma -->
        <bio:parameter name="gmax" value="14.2">
          <bio:group>OneSecGrp_SectionRef_1</bio:group>
        </bio:parameter>
      </bio:mechanism>
      <bio:mechanism name="K2_mit_usb" type="Channel Mechanism">
        <!-- primary dendrite: Aditya increased this value to make it allow bAP -->
        <bio:parameter name="gmax" value="50.0">
          <bio:group>ModelViewParmSubset_24</bio:group>
        </bio:parameter>
        <!-- all the tuft compartments -->
        <bio:parameter name="gmax" value="10.0">
          <bio:group>ModelViewParmSubset_32</bio:group>
        </bio:parameter>
        <bio:parameter name="gmax" value="7.7">
          <bio:group>ModelViewParmSubset_25</bio:group>
        </bio:parameter>
        <bio:parameter name="gmax" value="12.8">
          <bio:group>ModelViewParmSubset_26</bio:group>
        </bio:parameter>
        <bio:parameter name="gmax" value="22.6">
          <bio:group>ModelViewParmSubset_27</bio:group>
        </bio:parameter>
        <bio:parameter name="gmax" value="38.5">
          <bio:group>OneSecGrp_SectionRef_115</bio:group>
        </bio:parameter>
        <bio:parameter name="gmax" value="77.1">
          <bio:group>ModelViewParmSubset_28</bio:group>
        </bio:parameter>
        <bio:parameter name="gmax" value="115.6">
          <bio:group>ModelViewParmSubset_29</bio:group>
        </bio:parameter>
        <bio:parameter name="gmax" value="154.1">
          <bio:group>ModelViewParmSubset_30</bio:group>
        </bio:parameter>
        <bio:parameter name="gmax" value="195.6">
          <bio:group>OneSecGrp_SectionRef_1</bio:group> <!-- soma -->
        </bio:parameter>
        <!-- 'axon[0]' is considered hillock and 'axon[1]' the initial segment. -->
        <!-- Override for axon[0] below, even if set above. -->
        <!-- I could not make the mitral more excitable by increasing Kfast in hillock -->
        <bio:parameter name="gmax" value="200.0">
          <bio:group>OneSecGrp_SectionRef_13</bio:group>
        </bio:parameter>
      </bio:mechanism>
      <bio:mechanism name="K_mit_usb" type="Channel Mechanism">
        <bio:parameter name="gmax" value="0.85">
          <bio:group>ModelViewParmSubset_27</bio:group>
        </bio:parameter>
        <bio:parameter name="gmax" value="1.55">
          <bio:group>ModelViewParmSubset_23</bio:group>
        </bio:parameter>
        <bio:parameter name="gmax" value="1.74">
          <bio:group>ModelViewParmSubset_24</bio:group>
        </bio:parameter>
        <bio:parameter name="gmax" value="2.8">
          <bio:group>ModelViewParmSubset_31</bio:group>
        </bio:parameter>
      </bio:mechanism>
      <bio:mechanism name="LCa3_mit_usb" type="Channel Mechanism">
      <!-- prox sec dend -->
        <bio:parameter name="gmax" value="0.4">
          <bio:group>ModelViewParmSubset_27</bio:group>
        </bio:parameter>
        <!-- axon[0] to axon[4] -->
        <bio:parameter name="gmax" value="2">
          <bio:group>ModelViewParmSubset_23</bio:group>
        </bio:parameter>
        <!-- primary dendrite -->
        <bio:parameter name="gmax" value="2.2">
          <bio:group>ModelViewParmSubset_24</bio:group>
        </bio:parameter>
        <!-- soma -->
        <bio:parameter name="gmax" value="4">
          <bio:group>OneSecGrp_SectionRef_1</bio:group>
        </bio:parameter>
        <!-- glomerulus -->
        <bio:parameter name="gmax" value="9.5">
          <bio:group>ModelViewParmSubset_32</bio:group>
        </bio:parameter>
      </bio:mechanism>
      <bio:mechanism name="Na_mit_ms" type="Channel Mechanism">
        <!-- primary dendrite: Aditya increased this value to make it allow bAP -->
        <bio:parameter name="gmax" value="50.0">
          <bio:group>ModelViewParmSubset_24</bio:group>
        </bio:parameter>
        <!-- all the tuft compartments -->
        <bio:parameter name="gmax" value="10.0">
          <bio:group>ModelViewParmSubset_32</bio:group>
        </bio:parameter>
        <!-- axon[9] and axon[10] -->
        <bio:parameter name="gmax" value="11.7">
          <bio:group>ModelViewParmSubset_33</bio:group>
        </bio:parameter>
        <bio:parameter name="gmax" value="12.2">
          <bio:group>ModelViewParmSubset_26</bio:group>
        </bio:parameter>
        <bio:parameter name="gmax" value="153.2">
          <bio:group>OneSecGrp_SectionRef_1</bio:group> <!-- soma -->
        </bio:parameter>
        <bio:parameter name="gmax" value="23.4">
          <bio:group>OneSecGrp_SectionRef_140</bio:group>
        </bio:parameter>
        <bio:parameter name="gmax" value="33">
          <bio:group>ModelViewParmSubset_27</bio:group>
        </bio:parameter>
        <bio:parameter name="gmax" value="58.6">
          <bio:group>OneSecGrp_SectionRef_115</bio:group>
        </bio:parameter>
        <bio:parameter name="gmax" value="117">
          <bio:group>OneSecGrp_SectionRef_90</bio:group>
        </bio:parameter>
        <bio:parameter name="gmax" value="234">
          <bio:group>OneSecGrp_SectionRef_73</bio:group>
        </bio:parameter>
        <bio:parameter name="gmax" value="351.1">
          <bio:group>ModelViewParmSubset_34</bio:group>
        </bio:parameter>
        <bio:parameter name="gmax" value="468.1">
          <bio:group>ModelViewParmSubset_23</bio:group>
          <!-- This contains cable "2" axon[0] i.e. hillock also: but axon[0] overridden below -->
        </bio:parameter>
      </bio:mechanism>
      <!-- 'axon[0]' is considered hillock and 'axon[1]' the initial segment. -->
      <!-- I could not make the mitral more excitable by increasing Na in hillock, so default -->
      <bio:mechanism name="Na_mit_initialsegment_ms" type="Channel Mechanism">
        <bio:parameter name="gmax" value="500.0">
          <bio:group>OneSecGrp_SectionRef_13</bio:group>
        </bio:parameter>
      </bio:mechanism>
      <!-- capacitance and axial resistance and init_memb_potential
       must be at the very end! Order of these three is important! -->
      <bio:spec_capacitance>
        <bio:parameter value="1">
          <bio:group>all</bio:group>
        </bio:parameter>
      </bio:spec_capacitance>
      <bio:spec_axial_resistance>
        <bio:parameter value="0.2">
          <bio:group>all</bio:group>
        </bio:parameter>
      </bio:spec_axial_resistance>
      <bio:init_memb_potential>
        <bio:parameter value="-58">
          <bio:group>all</bio:group>
        </bio:parameter>
      </bio:init_memb_potential>
    </biophysics>
    <connectivity>
      <!-- These synapse_types do not correspond to actual synapses in /library.
      Rather, they must be used by network generators to map these synapse_types into say AMPA/NMDA etc.
      In any case, these only represent potential locations and not actually realized ones. -->
      <nml:potential_syn_loc synapse_type="ORN_mitral" synapse_direction="post">
        <!--<nml:group>OneSecGrp_SectionRef_48</nml:group>--> <!-- Just prim_dend[5] at the base of the glomerulus -->
        <nml:group>ModelViewParmSubset_32</nml:group> <!-- all glom tuft compartments -->
      </nml:potential_syn_loc>
      <nml:potential_syn_loc synapse_type="PG_mitral" synapse_direction="post">
        <!--<nml:group>ModelViewParmSubset_20</nml:group>--> <!-- Just glom[0] and glom[47] the base of the glomerulus -->
        <nml:group>ModelViewParmSubset_32</nml:group> <!-- all glom tuft compartments -->
      </nml:potential_syn_loc>
      <nml:potential_syn_loc synapse_type="granule_mitral" synapse_direction="post">
        <nml:group>ModelViewParmSubset_26</nml:group> <!-- part 1 of secondary dendrite compartments -->
        <nml:group>ModelViewParmSubset_27</nml:group> <!-- part 2 of secondary dendrite compartments -->
        <nml:group>ModelViewParmSubset_24</nml:group> <!-- all primary dendrite compartments i.e. 0 to 5 -->
        <nml:group>OneSecGrp_SectionRef_1</nml:group> <!-- soma -->
      </nml:potential_syn_loc>
    </connectivity>
  </cell>
</cells>
</neuroml>
